<?xml version="1.0"?>
<?xml-stylesheet type="text/xsl" href="/JSBSim.xsl"?>
<fdm_config name="Mirage2000" version="2.0" release="ALPHA"
   xmlns:xsi="http://www.w3.org/2001/XMLSchema-instance"
   xsi:noNamespaceSchemaLocation="JSBSim.xsd">

    <fileheader>
        <author>Richard Harrison</author>
        <filecreationdate>2020-02-09</filecreationdate>
        <version>1.0</version>
        <copyright>Copyright (C) 2017 Richard Harrison, All rights reserved</copyright>
        <description>Dassault Mirage 2000-5 Aerodynamic data built from vspaero; CG (8.56, 0, 0)M, 2020-02-09 17:27</description>
        <note>Built using VSPAERO. VSPAero control sub surfaces are used for the elevons, slats and rudder. These are all then processed and this data is built from the results (together with the -stab to get the derivatives)</note>
        <note>Aircraft origin for measurements is the nose</note>
        <note>VSPAERO notes: Rudder deflection is LE right. Elevator is TE down.</note>
        <note>Cl max 1.6</note>
        <note>Built with AeroTool 1.0.0.0: Options: AeroDetail=Full, ExternalTanks, Flaps, Gear, GroundEffect, Mach, WakeIterations=3</note>
        <limitation></limitation>
        <reference
            refID="ZDAT/AED/2017/09-08"
            author="Richard Harrison, rjh@zaretto.com"
            title="Mirage 2000-5 Aerodynamic data built from vspaero; AeroRP (8.56, 0, 0)M"
            date="September, 2017"
            URL="http://www.zaretto.com/sites/zaretto.com/files/Mirage2000-data-data/rjh-zaretto-Mirage2000-aerodynamic-data-vspaero.pdf"
        />
    </fileheader>
<metrics>
  <wingarea unit="M2">28.172</wingarea>
  <wingspan unit="M">7.866</wingspan>
  <chord unit="M">3.581</chord>
  <location unit="IN" name="EYEPOINT">
    <x>197</x>
    <y>0</y>
    <z>-3.94</z>
  </location>
  <location unit="IN" name="VRP">
    <x>200</x>
    <y>0</y>
    <z>44</z>
  </location>
  <location unit="M" name="AERORP">
    <x>8.56</x>
    <y>0</y>
    <z>0</z>
  </location>
</metrics>

<mass_balance>
  <ixx unit="KG*M2">6262</ixx>
  <iyy unit="KG*M2">75686</iyy>
  <izz unit="KG*M2">78802</izz>
  <ixz unit="KG*M2">2141</ixz>
  <emptywt unit="LBS">28000</emptywt>
  <location unit="M" name="CG">
    <x>8.56</x>
    <y>0</y>
    <z>0</z>
  </location>
</mass_balance>

<ground_reactions>
  <contact type="BOGEY" name="NOSE_LG">
    <!--0: NOSE_LG-->
    <location unit="M">
      <x>4.01</x>
      <y>0</y>
      <z>-1.518</z>
    </location>
    <static_friction>1.0</static_friction>
    <dynamic_friction>0.5</dynamic_friction>
    <rolling_friction>0.02</rolling_friction>
    <spring_coeff unit="LBS/FT">25200</spring_coeff>
    <damping_coeff unit="LBS/FT/SEC">1400</damping_coeff>
    <max_steer unit="DEG">45</max_steer>
    <brake_group>NOSE</brake_group>
    <retractable>1</retractable>
  </contact>
  <contact type="BOGEY" name="LEFT_MLG">
    <!--1: LEFT_MLG-->
    <location unit="M">
      <x>8.76</x>
      <y>-1.625</y>
      <z>-1.458</z>
    </location>
    <static_friction>1.0</static_friction>
    <dynamic_friction>0.5</dynamic_friction>
    <rolling_friction>0.02</rolling_friction>
    <spring_coeff unit="LBS/FT">25200</spring_coeff>
    <damping_coeff unit="LBS/FT/SEC">1400</damping_coeff>
    <max_steer unit="DEG">0</max_steer>
    <brake_group>LEFT</brake_group>
    <retractable>1</retractable>
  </contact>
  <contact type="BOGEY" name="RIGHT_MLG">
    <!--2: RIGHT_MLG-->
    <location unit="M">
      <x>8.76</x>
      <y>1.625</y>
      <z>-1.458</z>
    </location>
    <static_friction>1.0</static_friction>
    <dynamic_friction>0.5</dynamic_friction>
    <rolling_friction>0.02</rolling_friction>
    <spring_coeff unit="LBS/FT">25200</spring_coeff>
    <damping_coeff unit="LBS/FT/SEC">1400</damping_coeff>
    <max_steer unit="DEG">0</max_steer>
    <brake_group>RIGHT</brake_group>
    <retractable>1</retractable>
  </contact>
  <contact type="STRUCTURE" name="LEFT_WING_TIP">
    <!--3: LEFT_WING_TIP-->
    <location unit="M">
      <x>11.71</x>
      <y>-4.53</y>
      <z>-0.25</z>
    </location>
    <static_friction>1.2</static_friction>
    <dynamic_friction>1.212</dynamic_friction>
    <rolling_friction>1.413</rolling_friction>
    <spring_coeff unit="LBS/FT">10000</spring_coeff>
    <damping_coeff unit="LBS/FT/SEC">2000</damping_coeff>
  </contact>
  <contact type="STRUCTURE" name="RIGHT_WING_TIP">
    <!--4: RIGHT_WING_TIP-->
    <location unit="M">
      <x>11.71</x>
      <y>4.53</y>
      <z>-0.25</z>
    </location>
    <static_friction>1.2</static_friction>
    <dynamic_friction>1.212</dynamic_friction>
    <rolling_friction>1.413</rolling_friction>
    <spring_coeff unit="LBS/FT">10000</spring_coeff>
    <damping_coeff unit="LBS/FT/SEC">2000</damping_coeff>
  </contact>
  <contact type="STRUCTURE" name="CANOPY">
    <!--5: CANOPY-->
    <location unit="M">
      <x>4.27</x>
      <y>0</y>
      <z>1.46</z>
    </location>
    <static_friction>1.2</static_friction>
    <dynamic_friction>1.212</dynamic_friction>
    <rolling_friction>1.413</rolling_friction>
    <spring_coeff unit="LBS/FT">10000</spring_coeff>
    <damping_coeff unit="LBS/FT/SEC">2000</damping_coeff>
  </contact>
  <contact type="STRUCTURE" name="REAR_CANOPY">
    <!--6: REAR_CANOPY-->
    <location unit="M">
      <x>5.05</x>
      <y>0</y>
      <z>1.58</z>
    </location>
    <static_friction>1.2</static_friction>
    <dynamic_friction>1.212</dynamic_friction>
    <rolling_friction>1.413</rolling_friction>
    <spring_coeff unit="LBS/FT">10000</spring_coeff>
    <damping_coeff unit="LBS/FT/SEC">2000</damping_coeff>
  </contact>
  <contact type="STRUCTURE" name="RADOME_FRONT">
    <!--7: RADOME_FRONT-->
    <location unit="M">
      <x>0</x>
      <y>0</y>
      <z>0</z>
    </location>
    <static_friction>1.2</static_friction>
    <dynamic_friction>1.212</dynamic_friction>
    <rolling_friction>1.413</rolling_friction>
    <spring_coeff unit="LBS/FT">10000</spring_coeff>
    <damping_coeff unit="LBS/FT/SEC">2000</damping_coeff>
  </contact>
  <contact type="STRUCTURE" name="VERTICAL_TAIL_FRONT">
    <!--8: VERTICAL_TAIL_FRONT-->
    <location unit="M">
      <x>13.06</x>
      <y>0</y>
      <z>3.63</z>
    </location>
    <static_friction>1.2</static_friction>
    <dynamic_friction>1.212</dynamic_friction>
    <rolling_friction>1.413</rolling_friction>
    <spring_coeff unit="LBS/FT">10000</spring_coeff>
    <damping_coeff unit="LBS/FT/SEC">2000</damping_coeff>
  </contact>
  <contact type="STRUCTURE" name="VERTICAL_TAIL_REAR">
    <!--9: VERTICAL_TAIL_REAR-->
    <location unit="M">
      <x>13.72</x>
      <y>0</y>
      <z>3.54</z>
    </location>
    <static_friction>1.2</static_friction>
    <dynamic_friction>1.212</dynamic_friction>
    <rolling_friction>1.413</rolling_friction>
    <spring_coeff unit="LBS/FT">10000</spring_coeff>
    <damping_coeff unit="LBS/FT/SEC">2000</damping_coeff>
  </contact>
  <contact type="STRUCTURE" name="REAR_BODY_LEFT">
    <!--10: REAR_BODY_LEFT-->
    <location unit="M">
      <x>13.63</x>
      <y>-0.5</y>
      <z>0.53</z>
    </location>
    <static_friction>1.2</static_friction>
    <dynamic_friction>1.212</dynamic_friction>
    <rolling_friction>1.413</rolling_friction>
    <spring_coeff unit="LBS/FT">10000</spring_coeff>
    <damping_coeff unit="LBS/FT/SEC">2000</damping_coeff>
  </contact>
  <contact type="STRUCTURE" name="REAR_BODY_RIGHT">
    <!--11: REAR_BODY_RIGHT-->
    <location unit="M">
      <x>13.63</x>
      <y>0.5</y>
      <z>0.53</z>
    </location>
    <static_friction>1.2</static_friction>
    <dynamic_friction>1.212</dynamic_friction>
    <rolling_friction>1.413</rolling_friction>
    <spring_coeff unit="LBS/FT">10000</spring_coeff>
    <damping_coeff unit="LBS/FT/SEC">2000</damping_coeff>
  </contact>
  <contact type="STRUCTURE" name="LOWER_REAR_BODY">
    <!--12: LOWER_REAR_BODY-->
    <location unit="M">
      <x>13.63</x>
      <y>0</y>
      <z>0.03</z>
    </location>
    <static_friction>1.2</static_friction>
    <dynamic_friction>1.212</dynamic_friction>
    <rolling_friction>1.413</rolling_friction>
    <spring_coeff unit="LBS/FT">10000</spring_coeff>
    <damping_coeff unit="LBS/FT/SEC">2000</damping_coeff>
  </contact>
  <contact type="STRUCTURE" name="LOWER_MID_REAR_BODY">
    <!--13: LOWER_MID_REAR_BODY-->
    <location unit="M">
      <x>11.56</x>
      <y>0</y>
      <z>-0.32</z>
    </location>
    <static_friction>1.2</static_friction>
    <dynamic_friction>1.212</dynamic_friction>
    <rolling_friction>1.413</rolling_friction>
    <spring_coeff unit="LBS/FT">10000</spring_coeff>
    <damping_coeff unit="LBS/FT/SEC">2000</damping_coeff>
  </contact>
  <contact type="STRUCTURE" name="REFUEL_PROBE">
    <!--14: REFUEL_PROBE-->
    <location unit="M">
      <x>1.53</x>
      <y>0.55</y>
      <z>1.17</z>
    </location>
    <static_friction>1.2</static_friction>
    <dynamic_friction>1.212</dynamic_friction>
    <rolling_friction>1.413</rolling_friction>
    <spring_coeff unit="LBS/FT">10000</spring_coeff>
    <damping_coeff unit="LBS/FT/SEC">2000</damping_coeff>
  </contact>
  <contact type="STRUCTURE" name="LEFT_STRAKE">
    <!--15: LEFT_STRAKE-->
    <location unit="M">
      <x>5.21</x>
      <y>-1.13</y>
      <z>0.64</z>
    </location>
    <static_friction>1.2</static_friction>
    <dynamic_friction>1.212</dynamic_friction>
    <rolling_friction>1.413</rolling_friction>
    <spring_coeff unit="LBS/FT">10000</spring_coeff>
    <damping_coeff unit="LBS/FT/SEC">2000</damping_coeff>
  </contact>
  <contact type="STRUCTURE" name="RIGHT_STRAKE">
    <!--16: RIGHT_STRAKE-->
    <location unit="M">
      <x>5.21</x>
      <y>1.13</y>
      <z>0.64</z>
    </location>
    <static_friction>1.2</static_friction>
    <dynamic_friction>1.212</dynamic_friction>
    <rolling_friction>1.413</rolling_friction>
    <spring_coeff unit="LBS/FT">10000</spring_coeff>
    <damping_coeff unit="LBS/FT/SEC">2000</damping_coeff>
  </contact>
  <contact type="STRUCTURE" name="FRONT_LOWER_ANTENNA">
    <!--17: FRONT_LOWER_ANTENNA-->
    <location unit="M">
      <x>2.35</x>
      <y>0</y>
      <z>-0.39</z>
    </location>
    <static_friction>1.2</static_friction>
    <dynamic_friction>1.212</dynamic_friction>
    <rolling_friction>1.413</rolling_friction>
    <spring_coeff unit="LBS/FT">10000</spring_coeff>
    <damping_coeff unit="LBS/FT/SEC">2000</damping_coeff>
  </contact>
  <contact type="STRUCTURE" name="VSTAB_FRONT_ANTENNA">
    <!--18: VSTAB_FRONT_ANTENNA-->
    <location unit="M">
      <x>11.98</x>
      <y>0</y>
      <z>3.06</z>
    </location>
    <static_friction>1.2</static_friction>
    <dynamic_friction>1.212</dynamic_friction>
    <rolling_friction>1.413</rolling_friction>
    <spring_coeff unit="LBS/FT">10000</spring_coeff>
    <damping_coeff unit="LBS/FT/SEC">2000</damping_coeff>
  </contact>
  <contact type="STRUCTURE" name="VSTAB_REAR_ANTENNA">
    <!--19: VSTAB_REAR_ANTENNA-->
    <location unit="M">
      <x>13.74</x>
      <y>0</y>
      <z>2.98</z>
    </location>
    <static_friction>1.2</static_friction>
    <dynamic_friction>1.212</dynamic_friction>
    <rolling_friction>1.413</rolling_friction>
    <spring_coeff unit="LBS/FT">10000</spring_coeff>
    <damping_coeff unit="LBS/FT/SEC">2000</damping_coeff>
  </contact>
  <contact type="STRUCTURE" name="CHUTE">
    <!--20: CHUTE-->
    <location unit="M">
      <x>13.83</x>
      <y>0</y>
      <z>1.21</z>
    </location>
    <static_friction>1.2</static_friction>
    <dynamic_friction>1.212</dynamic_friction>
    <rolling_friction>1.413</rolling_friction>
    <spring_coeff unit="LBS/FT">10000</spring_coeff>
    <damping_coeff unit="LBS/FT/SEC">2000</damping_coeff>
  </contact>
</ground_reactions>

<propulsion>
  <engine file="SNECMA_M53-P2">
    <location unit="M">
      <x>18.11</x>
      <y>0</y>
      <z>0</z>
    </location>
    <orient unit="DEG">
      <roll>0</roll>
      <pitch>0</pitch>
      <yaw>0</yaw>
    </orient>
    <feed>4</feed>
    <feed>3</feed>
    <feed>2</feed>
    <feed>1</feed>
    <feed>0</feed>
    <thruster file="direct">
      <location unit="M">
        <x>18.11</x>
        <y>0</y>
        <z>0</z>
      </location>
      <orient unit="DEG">
        <roll>0</roll>
        <pitch>0</pitch>
        <yaw>0</yaw>
      </orient>
    </thruster>
  </engine>
  <tank number="0" type="FUEL">
    <!--0: Main Tank-->
    <location unit="M">
      <x>8.56</x>
      <y>0</y>
      <z>0</z>
    </location>
    <capacity unit="KG">2128</capacity>
    <standpipe unit="KG">50</standpipe>
    <contents unit="KG">2128</contents>
    <priority>4</priority>
  </tank>
  <tank number="1" type="FUEL">
    <!--1: Right Wing Tank-->
    <location unit="M">
      <x>8.56</x>
      <y>4</y>
      <z>-0.4</z>
    </location>
    <capacity unit="LBS">385</capacity>
    <standpipe unit="LBS">100</standpipe>
    <contents unit="LBS">385</contents>
    <priority>3</priority>
  </tank>
  <tank number="2" type="FUEL">
    <!--2: Left Wing Tank-->
    <location unit="M">
      <x>8.56</x>
      <y>-4</y>
      <z>-0.4</z>
    </location>
    <capacity unit="LBS">385</capacity>
    <standpipe unit="LBS">100</standpipe>
    <contents unit="LBS">385</contents>
    <priority>3</priority>
  </tank>
  <tank number="3" type="FUEL">
    <!--3: External Tank-->
    <location unit="M">
      <x>8.56</x>
      <y>0</y>
      <z>0.008</z>
    </location>
    <capacity unit="KG">1200</capacity>
    <standpipe unit="KG">50</standpipe>
    <contents unit="KG">1200</contents>
    <priority>2</priority>
  </tank>
  <tank number="4" type="FUEL">
    <!--4: Feed line-->
    <location unit="M">
      <x>8.56</x>
      <y>0</y>
      <z>0</z>
    </location>
    <capacity unit="LBS">10</capacity>
    <contents unit="LBS">10</contents>
    <priority>1</priority>
  </tank>
</propulsion>

<system file="Mirage-2000-hydraulics"/>
<system file="Mirage-2000-electrics"/>
<system file="Mirage-2000-avionics"/>
<system file="Mirage-2000-ecs"/>
<system file="Mirage-2000-fadec"/>
<system file="Mirage-2000-engines-Snecma-M53"/>
<system file="Mirage-2000-fcs"/>
<external_reactions>
  <force name="catapult" frame="BODY">
    <location unit="IN">
      <x>667</x>
      <y>0</y>
      <z>0</z>
    </location>
    <direction>
      <x>1</x>
      <y>0</y>
      <z>0</z>
    </direction>
  </force>
  <force name="holdback" frame="BODY">
    <location unit="IN">
      <x>667</x>
      <y>0</y>
      <z>0</z>
    </location>
    <direction>
      <x>-1</x>
      <y>0</y>
      <z>0</z>
    </direction>
  </force>
  <force name="hook" frame="BODY">
    <location unit="IN">
      <x>300</x>
      <y>0</y>
      <z>0</z>
    </location>
    <direction>
      <x>-0.9995</x>
      <y>0</y>
      <z>0.01</z>
    </direction>
  </force>
</external_reactions>

<flight_control name="Mirage2000-FCS">
       <property value="8.56">metrics/cg-x-m</property>
       <property value="0">metrics/cg-z-m</property>
  <channel name="extra-aero">
        <!-- need %Cg in chord for moments [Xcg - Xref)/100] -->
        <summer name="cg-x-offset-chord-in">
            <input> inertia/cg-x-in</input>
            <input> -metrics/aero-rp-x-in</input>
            <output>inertia/cg-x-offset-chord-in</output>
        </summer>

        <!-- figure out the factor for the fuel tank aero -->
        <pure_gain name="cg-x-chord-percent">
            <description>Percent offset of the CoP from the CG</description>
            <input>inertia/cg-x-offset-chord-in</input>
            <gain> -0.01</gain>
            <clipto>
                <min> -1 </min>
                <max> 1 </max>
            </clipto>
            <output> inertia/cg-x-mac-percent </output>
        </pure_gain>

        <fcs_function name="pb">
            <description>PB Denormalization</description>
            <function>
                    <product>
                        <property>aero/bi2vel</property>
                        <property>velocities/p-aero-rad_sec</property>
                    </product>
            </function>
            <output>aero/pb</output>
        </fcs_function>

        <fcs_function name="cbarq-2vo">
            <description>For denormalization</description>
            <function>
                    <product>
                        <property>aero/ci2vel</property>
                        <property>velocities/q-aero-rad_sec</property>
                    </product>
            </function>
            <output>aero/qb</output>
        </fcs_function>

        <fcs_function name="rb-2vo">
            <description>For denormalization</description>
            <function>
                <product>
                        <property>aero/bi2vel</property>
                        <property>velocities/r-aero-rad_sec</property>
                    </product>
            </function>
            <output>aero/rb</output>
        </fcs_function>


        <fcs_function name="aero-cos-alpha">
            <function>
                <cos>
                    <property>aero/alpha-rad</property>
                </cos>
            </function>
            <output>aero/cos-alpha</output>
        </fcs_function>

        <fcs_function name="aero-sin-alpha">
            <function>
                <sin>
                    <property>aero/alpha-rad</property>
                </sin>
            </function>
            <output>aero/sin-alpha</output>
        </fcs_function>
        <fcs_function name="position/h-agl-m">
            <description>Height above ground (meters)</description>
            <function>
                    <product>
                        <property>position/h-agl-ft</property>
                        <value>0.3048</value>
                    </product>
            </function>
            <output>position/h-agl-m</output>
        </fcs_function>

       </channel>
</flight_control>
<aerodynamics>
    <function name="aero/coefficients/CFXB">
    <description>BASIC DRAG</description>
          <table>
            <independentVar lookup="row">aero/alpha-deg</independentVar>
            <tableData>
                    -10		0.06156167
                     -5		0.03341975
                     -2		0.02679640
                      0		0.02710441
                      2		0.03130645
                      4		0.03980619
                      6		0.05324196
                      8		0.07272753
                     10		0.10013571
                     12		0.13794210
                     16		0.25559401
                     18		0.33600082
                     20		0.42390262
                     22		0.51092406
                     24		0.59063647
                     26		0.66135700
                     28		0.72522593
                     30		0.78513859
                     35		0.93216309
                     40		1.09008722
                     60		1.88418093
            </tableData>
          </table>
    </function>
    <function name="aero/coefficients/CFXCTNK">
    <description>DRAG INCREMENT DUE TO TANK(CENTRE)</description>
    <product>
          <property>metrics/stores-centre-tank</property>
          <table>
            <independentVar lookup="row">aero/alpha-deg</independentVar>
            <independentVar lookup="column">aero/beta-deg</independentVar>
            <tableData>
                                 -7	         -5	         -2	          0	          2	          5	          7
                    -10	0.00321000	0.00321000	0.00319000	0.00319000	0.00319000	0.00319000	0.00322000
                     -5	0.00316000	0.00316000	0.00315000	0.00315000	0.00315000	0.00316000	0.00316000
                     -2	0.00315000	0.00315000	0.00314000	0.00314000	0.00314000	0.00315000	0.00315000
                      0	0.00315000	0.00315000	0.00314000	0.00314000	0.00314000	0.00315000	0.00315000
                      2	0.00316000	0.00315000	0.00314000	0.00315000	0.00314000	0.00315000	0.00316000
                      4	0.00317000	0.00317000	0.00316000	0.00316000	0.00316000	0.00316000	0.00317000
                      6	0.00320000	0.00319000	0.00317000	0.00317000	0.00317000	0.00319000	0.00320000
                      8	0.00321000	0.00319000	0.00320000	0.00320000	0.00320000	0.00322000	0.00321000
                     10	0.00326000	0.00323000	0.00323000	0.00322000	0.00322000	0.00322000	0.00326000
                     12	0.00331000	0.00326000	0.00326000	0.00326000	0.00326000	0.00334000	0.00329000
                     16	0.00334000	0.00328000	0.00332000	0.00330000	0.00332000	0.00332000	0.00334000
                     18	0.00338000	0.00341000	0.00332000	0.00334000	0.00334000	0.00336000	0.00336000
                     20	0.00352000	0.00344000	0.00340000	0.00338000	0.00338000	0.00345000	0.00349000
                     22	0.00385000	0.00346000	0.00346000	0.00346000	0.00347000	0.00347000	0.00374000
                     24	0.00382000	0.00356000	0.00348000	0.00345000	0.00348000	0.00350000	0.00359000
                     26	0.00342000	0.00347000	0.00358000	0.00357000	0.00355000	0.00368000	0.00363000
                     28	0.00334000	0.00361000	0.00348000	0.00354000	0.00359000	0.00358000	0.00360000
                     30	0.00348000	0.00368000	0.00349000	0.00358000	0.00358000	0.00358000	0.00347000
                     35	0.00367000	0.00368000	0.00370000	0.00356000	0.00356000	0.00367000	0.00362000
                     40	0.00365000	0.00449000	0.00348000	0.00324000	0.00353000	0.00488000	0.00373000
            </tableData>
          </table>
       </product>
    </function>
    <function name="aero/coefficients/CFXDED1L">
    <description>DRAG DUE TO ELEVON 1L</description>
          <table>
            <independentVar lookup="row">aero/alpha-deg</independentVar>
            <independentVar lookup="column">aero/beta-deg</independentVar>
            <independentVar lookup="table">fcs/elevon-1L-pos-deg</independentVar>
              <tableData breakPoint="-16">
                               -7	        -5	        -2	         0	         2	         5	         7
                    -10	0.01782000	0.01842000	0.01905000	0.01936000	0.01966000	0.01996000	0.02009000
                     -5	0.01097000	0.01114000	0.01213000	0.01250000	0.01289000	0.01289000	0.01325000
                     -2	0.00682000	0.00721000	0.00777000	0.00807000	0.00836000	0.00872000	0.00890000
                      0	0.00400000	0.00435000	0.00484000	0.00514000	0.00542000	0.00579000	0.00603000
                      2	0.00112000	0.00143000	0.00188000	0.00218000	0.00246000	0.00287000	0.00314000
                      4	-0.00181000	-0.00153000	-0.00110000	-0.00081000	-0.00052000	-0.00007000	0.00021000
                      6	-0.00476000	-0.00447000	-0.00408000	-0.00381000	-0.00351000	-0.00304000	-0.00274000
                      8	-0.00771000	-0.00746000	-0.00707000	-0.00681000	-0.00650000	-0.00601000	-0.00571000
                     10	-0.01062000	-0.01040000	-0.01009000	-0.00982000	-0.00951000	-0.00902000	-0.00872000
                     12	-0.01365000	-0.01337000	-0.01307000	-0.01282000	-0.01252000	-0.01195000	-0.01156000
                     16	-0.01934000	-0.01932000	-0.01896000	-0.01874000	-0.01846000	-0.01784000	-0.01746000
                     18	-0.02221000	-0.02207000	-0.02184000	-0.02167000	-0.02137000	-0.02082000	-0.02028000
                     20	-0.02478000	-0.02478000	-0.02463000	-0.02448000	-0.02423000	-0.02362000	-0.02323000
                     22	-0.02716000	-0.02742000	-0.02739000	-0.02722000	-0.02701000	-0.02640000	-0.02581000
                     24	-0.02992000	-0.03019000	-0.03010000	-0.02999000	-0.02975000	-0.02903000	-0.02833000
                     26	-0.03347000	-0.03279000	-0.03274000	-0.03262000	-0.03237000	-0.03154000	-0.03215000
                     28	-0.03533000	-0.03520000	-0.03532000	-0.03526000	-0.03475000	-0.03426000	-0.03403000
                     30	-0.03719000	-0.03756000	-0.03777000	-0.03764000	-0.03720000	-0.03679000	-0.03648000
                     35	-0.04301000	-0.04319000	-0.04321000	-0.04310000	-0.04307000	-0.04197000	-0.04191000
                     40	-0.04760000	-0.04682000	-0.04821000	-0.04831000	-0.04758000	-0.04586000	-0.04594000
                     60	-0.05775000	-0.05689000	-0.05683000	-0.05696000	-0.05827000	-0.05498000	-0.05338000
              </tableData>
              <tableData breakPoint="0">
                               -7	        -5	        -2	         0	         2	         5	         7
                    -10	0.00000000	0.00000000	0.00000000	0.00000000	0.00000000	0.00000000	0.00000000
                     -5	0.00000000	0.00000000	0.00000000	0.00000000	0.00000000	0.00000000	0.00000000
                     -2	0.00000000	0.00000000	0.00000000	0.00000000	0.00000000	0.00000000	0.00000000
                      0	0.00000000	0.00000000	0.00000000	0.00000000	0.00000000	0.00000000	0.00000000
                      2	0.00000000	0.00000000	0.00000000	0.00000000	0.00000000	0.00000000	0.00000000
                      4	0.00000000	0.00000000	0.00000000	0.00000000	0.00000000	0.00000000	0.00000000
                      6	0.00000000	0.00000000	0.00000000	0.00000000	0.00000000	0.00000000	0.00000000
                      8	0.00000000	0.00000000	0.00000000	0.00000000	0.00000000	0.00000000	0.00000000
                     10	0.00000000	0.00000000	0.00000000	0.00000000	0.00000000	0.00000000	0.00000000
                     12	0.00000000	0.00000000	0.00000000	0.00000000	0.00000000	0.00000000	0.00000000
                     16	0.00000000	0.00000000	0.00000000	0.00000000	0.00000000	0.00000000	0.00000000
                     18	0.00000000	0.00000000	0.00000000	0.00000000	0.00000000	0.00000000	0.00000000
                     20	0.00000000	0.00000000	0.00000000	0.00000000	0.00000000	0.00000000	0.00000000
                     22	0.00000000	0.00000000	0.00000000	0.00000000	0.00000000	0.00000000	0.00000000
                     24	0.00000000	0.00000000	0.00000000	0.00000000	0.00000000	0.00000000	0.00000000
                     26	0.00000000	0.00000000	0.00000000	0.00000000	0.00000000	0.00000000	0.00000000
                     28	0.00000000	0.00000000	0.00000000	0.00000000	0.00000000	0.00000000	0.00000000
                     30	0.00000000	0.00000000	0.00000000	0.00000000	0.00000000	0.00000000	0.00000000
                     35	0.00000000	0.00000000	0.00000000	0.00000000	0.00000000	0.00000000	0.00000000
                     40	0.00000000	0.00000000	0.00000000	0.00000000	0.00000000	0.00000000	0.00000000
                     60	0.00000000	0.00000000	0.00000000	0.00000000	0.00000000	0.00000000	0.00000000
              </tableData>
              <tableData breakPoint="25">
                               -7	        -5	        -2	         0	         2	         5	         7
                    -10	-0.00391000	-0.00449000	-0.00520000	-0.00573000	-0.00613000	-0.00666000	-0.00703000
                     -5	0.00661000	0.00666000	0.00549000	0.00502000	0.00450000	0.00437000	0.00370000
                     -2	0.01272000	0.01243000	0.01192000	0.01152000	0.01113000	0.01051000	0.01007000
                      0	0.01673000	0.01651000	0.01611000	0.01570000	0.01533000	0.01470000	0.01426000
                      2	0.02075000	0.02060000	0.02018000	0.01983000	0.01946000	0.01883000	0.01833000
                      4	0.02471000	0.02455000	0.02421000	0.02389000	0.02350000	0.02285000	0.02229000
                      6	0.02855000	0.02845000	0.02812000	0.02781000	0.02743000	0.02676000	0.02615000
                      8	0.03225000	0.03221000	0.03192000	0.03161000	0.03121000	0.03050000	0.02991000
                     10	0.03574000	0.03578000	0.03555000	0.03525000	0.03484000	0.03409000	0.03355000
                     12	0.03928000	0.03919000	0.03906000	0.03874000	0.03834000	0.03755000	0.03686000
                     16	0.04527000	0.04534000	0.04526000	0.04503000	0.04469000	0.04386000	0.04333000
                     18	0.04797000	0.04815000	0.04803000	0.04783000	0.04761000	0.04679000	0.04623000
                     20	0.05038000	0.05064000	0.05068000	0.05045000	0.05020000	0.04956000	0.04889000
                     22	0.05244000	0.05295000	0.05310000	0.05289000	0.05273000	0.05212000	0.05161000
                     24	0.05505000	0.05502000	0.05507000	0.05505000	0.05490000	0.05423000	0.05312000
                     26	0.05651000	0.05682000	0.05705000	0.05707000	0.05697000	0.05648000	0.05581000
                     28	0.05771000	0.05808000	0.05870000	0.05876000	0.05864000	0.05784000	0.05764000
                     30	0.05938000	0.05945000	0.06013000	0.06017000	0.05994000	0.05937000	0.05894000
                     35	0.06128000	0.06188000	0.06243000	0.06250000	0.06230000	0.06174000	0.06099000
                     40	0.06154000	0.06272000	0.06294000	0.06235000	0.06253000	0.06327000	0.06134000
                     60	0.04576000	0.04673000	0.04669000	0.04700000	0.04502000	0.04703000	0.04538000
              </tableData>
          </table>
    </function>
    <function name="aero/coefficients/CFXDED1R">
    <description>DRAG DUE TO ELEVON 1R</description>
          <table>
            <independentVar lookup="row">aero/alpha-deg</independentVar>
            <independentVar lookup="column">aero/beta-deg</independentVar>
            <independentVar lookup="table">fcs/elevon-1R-pos-deg</independentVar>
              <tableData breakPoint="-16">
                               -7	        -5	        -2	         0	         2	         5	         7
                    -10	0.01782000	0.01842000	0.01905000	0.01936000	0.01966000	0.01996000	0.02009000
                     -5	0.01097000	0.01114000	0.01213000	0.01250000	0.01289000	0.01289000	0.01325000
                     -2	0.00682000	0.00721000	0.00777000	0.00807000	0.00836000	0.00872000	0.00890000
                      0	0.00400000	0.00435000	0.00484000	0.00514000	0.00542000	0.00579000	0.00603000
                      2	0.00112000	0.00143000	0.00188000	0.00218000	0.00246000	0.00287000	0.00314000
                      4	-0.00181000	-0.00153000	-0.00110000	-0.00081000	-0.00052000	-0.00007000	0.00021000
                      6	-0.00476000	-0.00447000	-0.00408000	-0.00381000	-0.00351000	-0.00304000	-0.00274000
                      8	-0.00771000	-0.00746000	-0.00707000	-0.00681000	-0.00650000	-0.00601000	-0.00571000
                     10	-0.01062000	-0.01040000	-0.01009000	-0.00982000	-0.00951000	-0.00902000	-0.00872000
                     12	-0.01365000	-0.01337000	-0.01307000	-0.01282000	-0.01252000	-0.01195000	-0.01156000
                     16	-0.01934000	-0.01932000	-0.01896000	-0.01874000	-0.01846000	-0.01784000	-0.01746000
                     18	-0.02221000	-0.02207000	-0.02184000	-0.02167000	-0.02137000	-0.02082000	-0.02028000
                     20	-0.02478000	-0.02478000	-0.02463000	-0.02448000	-0.02423000	-0.02362000	-0.02323000
                     22	-0.02716000	-0.02742000	-0.02739000	-0.02722000	-0.02701000	-0.02640000	-0.02581000
                     24	-0.02992000	-0.03019000	-0.03010000	-0.02999000	-0.02975000	-0.02903000	-0.02833000
                     26	-0.03347000	-0.03279000	-0.03274000	-0.03262000	-0.03237000	-0.03154000	-0.03215000
                     28	-0.03533000	-0.03520000	-0.03532000	-0.03526000	-0.03475000	-0.03426000	-0.03403000
                     30	-0.03719000	-0.03756000	-0.03777000	-0.03764000	-0.03720000	-0.03679000	-0.03648000
                     35	-0.04301000	-0.04319000	-0.04321000	-0.04310000	-0.04307000	-0.04197000	-0.04191000
                     40	-0.04760000	-0.04682000	-0.04821000	-0.04831000	-0.04758000	-0.04586000	-0.04594000
                     60	-0.05775000	-0.05689000	-0.05683000	-0.05696000	-0.05827000	-0.05498000	-0.05338000
              </tableData>
              <tableData breakPoint="0">
                               -7	        -5	        -2	         0	         2	         5	         7
                    -10	0.00000000	0.00000000	0.00000000	0.00000000	0.00000000	0.00000000	0.00000000
                     -5	0.00000000	0.00000000	0.00000000	0.00000000	0.00000000	0.00000000	0.00000000
                     -2	0.00000000	0.00000000	0.00000000	0.00000000	0.00000000	0.00000000	0.00000000
                      0	0.00000000	0.00000000	0.00000000	0.00000000	0.00000000	0.00000000	0.00000000
                      2	0.00000000	0.00000000	0.00000000	0.00000000	0.00000000	0.00000000	0.00000000
                      4	0.00000000	0.00000000	0.00000000	0.00000000	0.00000000	0.00000000	0.00000000
                      6	0.00000000	0.00000000	0.00000000	0.00000000	0.00000000	0.00000000	0.00000000
                      8	0.00000000	0.00000000	0.00000000	0.00000000	0.00000000	0.00000000	0.00000000
                     10	0.00000000	0.00000000	0.00000000	0.00000000	0.00000000	0.00000000	0.00000000
                     12	0.00000000	0.00000000	0.00000000	0.00000000	0.00000000	0.00000000	0.00000000
                     16	0.00000000	0.00000000	0.00000000	0.00000000	0.00000000	0.00000000	0.00000000
                     18	0.00000000	0.00000000	0.00000000	0.00000000	0.00000000	0.00000000	0.00000000
                     20	0.00000000	0.00000000	0.00000000	0.00000000	0.00000000	0.00000000	0.00000000
                     22	0.00000000	0.00000000	0.00000000	0.00000000	0.00000000	0.00000000	0.00000000
                     24	0.00000000	0.00000000	0.00000000	0.00000000	0.00000000	0.00000000	0.00000000
                     26	0.00000000	0.00000000	0.00000000	0.00000000	0.00000000	0.00000000	0.00000000
                     28	0.00000000	0.00000000	0.00000000	0.00000000	0.00000000	0.00000000	0.00000000
                     30	0.00000000	0.00000000	0.00000000	0.00000000	0.00000000	0.00000000	0.00000000
                     35	0.00000000	0.00000000	0.00000000	0.00000000	0.00000000	0.00000000	0.00000000
                     40	0.00000000	0.00000000	0.00000000	0.00000000	0.00000000	0.00000000	0.00000000
                     60	0.00000000	0.00000000	0.00000000	0.00000000	0.00000000	0.00000000	0.00000000
              </tableData>
              <tableData breakPoint="25">
                               -7	        -5	        -2	         0	         2	         5	         7
                    -10	-0.00391000	-0.00449000	-0.00520000	-0.00573000	-0.00613000	-0.00666000	-0.00703000
                     -5	0.00661000	0.00666000	0.00549000	0.00502000	0.00450000	0.00437000	0.00370000
                     -2	0.01272000	0.01243000	0.01192000	0.01152000	0.01113000	0.01051000	0.01007000
                      0	0.01673000	0.01651000	0.01611000	0.01570000	0.01533000	0.01470000	0.01426000
                      2	0.02075000	0.02060000	0.02018000	0.01983000	0.01946000	0.01883000	0.01833000
                      4	0.02471000	0.02455000	0.02421000	0.02389000	0.02350000	0.02285000	0.02229000
                      6	0.02855000	0.02845000	0.02812000	0.02781000	0.02743000	0.02676000	0.02615000
                      8	0.03225000	0.03221000	0.03192000	0.03161000	0.03121000	0.03050000	0.02991000
                     10	0.03574000	0.03578000	0.03555000	0.03525000	0.03484000	0.03409000	0.03355000
                     12	0.03928000	0.03919000	0.03906000	0.03874000	0.03834000	0.03755000	0.03686000
                     16	0.04527000	0.04534000	0.04526000	0.04503000	0.04469000	0.04386000	0.04333000
                     18	0.04797000	0.04815000	0.04803000	0.04783000	0.04761000	0.04679000	0.04623000
                     20	0.05038000	0.05064000	0.05068000	0.05045000	0.05020000	0.04956000	0.04889000
                     22	0.05244000	0.05295000	0.05310000	0.05289000	0.05273000	0.05212000	0.05161000
                     24	0.05505000	0.05502000	0.05507000	0.05505000	0.05490000	0.05423000	0.05312000
                     26	0.05651000	0.05682000	0.05705000	0.05707000	0.05697000	0.05648000	0.05581000
                     28	0.05771000	0.05808000	0.05870000	0.05876000	0.05864000	0.05784000	0.05764000
                     30	0.05938000	0.05945000	0.06013000	0.06017000	0.05994000	0.05937000	0.05894000
                     35	0.06128000	0.06188000	0.06243000	0.06250000	0.06230000	0.06174000	0.06099000
                     40	0.06154000	0.06272000	0.06294000	0.06235000	0.06253000	0.06327000	0.06134000
                     60	0.04576000	0.04673000	0.04669000	0.04700000	0.04502000	0.04703000	0.04538000
              </tableData>
          </table>
    </function>
    <function name="aero/coefficients/CFXDED2L">
    <description>DRAG DUE TO ELEVON 2L</description>
          <table>
            <independentVar lookup="row">aero/alpha-deg</independentVar>
            <independentVar lookup="column">aero/beta-deg</independentVar>
            <independentVar lookup="table">fcs/elevon-2L-pos-deg</independentVar>
              <tableData breakPoint="-16">
                               -7	        -5	        -2	         0	         2	         5	         7
                    -10	0.02496000	0.02576000	0.02680000	0.02728000	0.02788000	0.02820000	0.02868000
                     -5	0.01406000	0.01414000	0.01676000	0.01763000	0.01851000	0.01784000	0.01879000
                     -2	0.00831000	0.00914000	0.01024000	0.01085000	0.01133000	0.01224000	0.01265000
                      0	0.00413000	0.00488000	0.00600000	0.00659000	0.00714000	0.00811000	0.00853000
                      2	-0.00005000	0.00067000	0.00170000	0.00237000	0.00300000	0.00389000	0.00443000
                      4	-0.00433000	-0.00360000	-0.00258000	-0.00189000	-0.00120000	-0.00026000	0.00032000
                      6	-0.00862000	-0.00788000	-0.00685000	-0.00615000	-0.00543000	-0.00444000	-0.00383000
                      8	-0.01289000	-0.01217000	-0.01112000	-0.01039000	-0.00968000	-0.00863000	-0.00796000
                     10	-0.01704000	-0.01647000	-0.01540000	-0.01466000	-0.01392000	-0.01286000	-0.01215000
                     12	-0.02159000	-0.02076000	-0.01965000	-0.01889000	-0.01815000	-0.01693000	-0.01609000
                     16	-0.02977000	-0.02928000	-0.02809000	-0.02729000	-0.02656000	-0.02534000	-0.02440000
                     18	-0.03394000	-0.03343000	-0.03230000	-0.03151000	-0.03072000	-0.02937000	-0.02819000
                     20	-0.03801000	-0.03756000	-0.03640000	-0.03560000	-0.03473000	-0.03335000	-0.03231000
                     22	-0.04226000	-0.04155000	-0.04047000	-0.03971000	-0.03880000	-0.03730000	-0.03593000
                     24	-0.04590000	-0.04569000	-0.04458000	-0.04378000	-0.04286000	-0.04131000	-0.03986000
                     26	-0.05045000	-0.04941000	-0.04851000	-0.04765000	-0.04679000	-0.04478000	-0.04388000
                     28	-0.05397000	-0.05330000	-0.05237000	-0.05154000	-0.05053000	-0.04863000	-0.04679000
                     30	-0.05823000	-0.05702000	-0.05620000	-0.05528000	-0.05430000	-0.05238000	-0.05063000
                     35	-0.06778000	-0.06637000	-0.06530000	-0.06401000	-0.06343000	-0.06045000	-0.05947000
                     40	-0.07591000	-0.07402000	-0.07332000	-0.07291000	-0.07097000	-0.06765000	-0.06684000
                     60	-0.09111000	-0.08991000	-0.08745000	-0.08964000	-0.08627000	-0.08208000	-0.07924000
              </tableData>
              <tableData breakPoint="0">
                               -7	        -5	        -2	         0	         2	         5	         7
                    -10	0.00000000	0.00000000	0.00000000	0.00000000	0.00000000	0.00000000	0.00000000
                     -5	0.00000000	0.00000000	0.00000000	0.00000000	0.00000000	0.00000000	0.00000000
                     -2	0.00000000	0.00000000	0.00000000	0.00000000	0.00000000	0.00000000	0.00000000
                      0	0.00000000	0.00000000	0.00000000	0.00000000	0.00000000	0.00000000	0.00000000
                      2	0.00000000	0.00000000	0.00000000	0.00000000	0.00000000	0.00000000	0.00000000
                      4	0.00000000	0.00000000	0.00000000	0.00000000	0.00000000	0.00000000	0.00000000
                      6	0.00000000	0.00000000	0.00000000	0.00000000	0.00000000	0.00000000	0.00000000
                      8	0.00000000	0.00000000	0.00000000	0.00000000	0.00000000	0.00000000	0.00000000
                     10	0.00000000	0.00000000	0.00000000	0.00000000	0.00000000	0.00000000	0.00000000
                     12	0.00000000	0.00000000	0.00000000	0.00000000	0.00000000	0.00000000	0.00000000
                     16	0.00000000	0.00000000	0.00000000	0.00000000	0.00000000	0.00000000	0.00000000
                     18	0.00000000	0.00000000	0.00000000	0.00000000	0.00000000	0.00000000	0.00000000
                     20	0.00000000	0.00000000	0.00000000	0.00000000	0.00000000	0.00000000	0.00000000
                     22	0.00000000	0.00000000	0.00000000	0.00000000	0.00000000	0.00000000	0.00000000
                     24	0.00000000	0.00000000	0.00000000	0.00000000	0.00000000	0.00000000	0.00000000
                     26	0.00000000	0.00000000	0.00000000	0.00000000	0.00000000	0.00000000	0.00000000
                     28	0.00000000	0.00000000	0.00000000	0.00000000	0.00000000	0.00000000	0.00000000
                     30	0.00000000	0.00000000	0.00000000	0.00000000	0.00000000	0.00000000	0.00000000
                     35	0.00000000	0.00000000	0.00000000	0.00000000	0.00000000	0.00000000	0.00000000
                     40	0.00000000	0.00000000	0.00000000	0.00000000	0.00000000	0.00000000	0.00000000
                     60	0.00000000	0.00000000	0.00000000	0.00000000	0.00000000	0.00000000	0.00000000
              </tableData>
              <tableData breakPoint="25">
                               -7	        -5	        -2	         0	         2	         5	         7
                    -10	-0.00752000	-0.00869000	-0.01030000	-0.01111000	-0.01202000	-0.01310000	-0.01396000
                     -5	0.00896000	0.00894000	0.00547000	0.00405000	0.00246000	0.00287000	0.00097000
                     -2	0.01739000	0.01647000	0.01496000	0.01392000	0.01282000	0.01137000	0.01029000
                      0	0.02329000	0.02241000	0.02123000	0.01991000	0.01876000	0.01747000	0.01618000
                      2	0.02932000	0.02846000	0.02709000	0.02593000	0.02472000	0.02321000	0.02202000
                      4	0.03522000	0.03433000	0.03286000	0.03182000	0.03059000	0.02890000	0.02771000
                      6	0.04089000	0.04010000	0.03859000	0.03751000	0.03633000	0.03454000	0.03319000
                      8	0.04648000	0.04564000	0.04418000	0.04305000	0.04185000	0.03997000	0.03851000
                     10	0.05181000	0.05106000	0.04960000	0.04846000	0.04719000	0.04524000	0.04385000
                     12	0.05740000	0.05631000	0.05482000	0.05371000	0.05240000	0.05045000	0.04868000
                     16	0.06661000	0.06594000	0.06446000	0.06341000	0.06213000	0.05997000	0.05847000
                     18	0.07046000	0.07055000	0.06894000	0.06786000	0.06661000	0.06439000	0.06271000
                     20	0.07563000	0.07477000	0.07326000	0.07207000	0.07078000	0.06870000	0.06712000
                     22	0.07926000	0.07884000	0.07717000	0.07610000	0.07482000	0.07270000	0.07083000
                     24	0.08293000	0.08227000	0.08080000	0.07973000	0.07833000	0.07617000	0.07441000
                     26	0.08502000	0.08556000	0.08403000	0.08308000	0.08172000	0.07981000	0.07731000
                     28	0.08900000	0.08846000	0.08713000	0.08600000	0.08459000	0.08267000	0.08018000
                     30	0.09212000	0.09098000	0.08980000	0.08878000	0.08707000	0.08507000	0.08341000
                     35	0.09745000	0.09614000	0.09509000	0.09395000	0.09192000	0.08967000	0.08728000
                     40	0.09994000	0.09992000	0.09738000	0.09572000	0.09448000	0.09265000	0.09008000
                     60	0.07392000	0.07502000	0.07368000	0.07278000	0.06922000	0.06870000	0.06716000
              </tableData>
          </table>
    </function>
    <function name="aero/coefficients/CFXDED2R">
    <description>DRAG DUE TO ELEVON 2R</description>
          <table>
            <independentVar lookup="row">aero/alpha-deg</independentVar>
            <independentVar lookup="column">aero/beta-deg</independentVar>
            <independentVar lookup="table">fcs/elevon-2R-pos-deg</independentVar>
              <tableData breakPoint="-16">
                               -7	        -5	        -2	         0	         2	         5	         7
                    -10	0.02496000	0.02576000	0.02680000	0.02728000	0.02788000	0.02820000	0.02868000
                     -5	0.01406000	0.01414000	0.01676000	0.01763000	0.01851000	0.01784000	0.01879000
                     -2	0.00831000	0.00914000	0.01024000	0.01085000	0.01133000	0.01224000	0.01265000
                      0	0.00413000	0.00488000	0.00600000	0.00659000	0.00714000	0.00811000	0.00853000
                      2	-0.00005000	0.00067000	0.00170000	0.00237000	0.00300000	0.00389000	0.00443000
                      4	-0.00433000	-0.00360000	-0.00258000	-0.00189000	-0.00120000	-0.00026000	0.00032000
                      6	-0.00862000	-0.00788000	-0.00685000	-0.00615000	-0.00543000	-0.00444000	-0.00383000
                      8	-0.01289000	-0.01217000	-0.01112000	-0.01039000	-0.00968000	-0.00863000	-0.00796000
                     10	-0.01704000	-0.01647000	-0.01540000	-0.01466000	-0.01392000	-0.01286000	-0.01215000
                     12	-0.02159000	-0.02076000	-0.01965000	-0.01889000	-0.01815000	-0.01693000	-0.01609000
                     16	-0.02977000	-0.02928000	-0.02809000	-0.02729000	-0.02656000	-0.02534000	-0.02440000
                     18	-0.03394000	-0.03343000	-0.03230000	-0.03151000	-0.03072000	-0.02937000	-0.02819000
                     20	-0.03801000	-0.03756000	-0.03640000	-0.03560000	-0.03473000	-0.03335000	-0.03231000
                     22	-0.04226000	-0.04155000	-0.04047000	-0.03971000	-0.03880000	-0.03730000	-0.03593000
                     24	-0.04590000	-0.04569000	-0.04458000	-0.04378000	-0.04286000	-0.04131000	-0.03986000
                     26	-0.05045000	-0.04941000	-0.04851000	-0.04765000	-0.04679000	-0.04478000	-0.04388000
                     28	-0.05397000	-0.05330000	-0.05237000	-0.05154000	-0.05053000	-0.04863000	-0.04679000
                     30	-0.05823000	-0.05702000	-0.05620000	-0.05528000	-0.05430000	-0.05238000	-0.05063000
                     35	-0.06778000	-0.06637000	-0.06530000	-0.06401000	-0.06343000	-0.06045000	-0.05947000
                     40	-0.07591000	-0.07402000	-0.07332000	-0.07291000	-0.07097000	-0.06765000	-0.06684000
                     60	-0.09111000	-0.08991000	-0.08745000	-0.08964000	-0.08627000	-0.08208000	-0.07924000
              </tableData>
              <tableData breakPoint="0">
                               -7	        -5	        -2	         0	         2	         5	         7
                    -10	0.00000000	0.00000000	0.00000000	0.00000000	0.00000000	0.00000000	0.00000000
                     -5	0.00000000	0.00000000	0.00000000	0.00000000	0.00000000	0.00000000	0.00000000
                     -2	0.00000000	0.00000000	0.00000000	0.00000000	0.00000000	0.00000000	0.00000000
                      0	0.00000000	0.00000000	0.00000000	0.00000000	0.00000000	0.00000000	0.00000000
                      2	0.00000000	0.00000000	0.00000000	0.00000000	0.00000000	0.00000000	0.00000000
                      4	0.00000000	0.00000000	0.00000000	0.00000000	0.00000000	0.00000000	0.00000000
                      6	0.00000000	0.00000000	0.00000000	0.00000000	0.00000000	0.00000000	0.00000000
                      8	0.00000000	0.00000000	0.00000000	0.00000000	0.00000000	0.00000000	0.00000000
                     10	0.00000000	0.00000000	0.00000000	0.00000000	0.00000000	0.00000000	0.00000000
                     12	0.00000000	0.00000000	0.00000000	0.00000000	0.00000000	0.00000000	0.00000000
                     16	0.00000000	0.00000000	0.00000000	0.00000000	0.00000000	0.00000000	0.00000000
                     18	0.00000000	0.00000000	0.00000000	0.00000000	0.00000000	0.00000000	0.00000000
                     20	0.00000000	0.00000000	0.00000000	0.00000000	0.00000000	0.00000000	0.00000000
                     22	0.00000000	0.00000000	0.00000000	0.00000000	0.00000000	0.00000000	0.00000000
                     24	0.00000000	0.00000000	0.00000000	0.00000000	0.00000000	0.00000000	0.00000000
                     26	0.00000000	0.00000000	0.00000000	0.00000000	0.00000000	0.00000000	0.00000000
                     28	0.00000000	0.00000000	0.00000000	0.00000000	0.00000000	0.00000000	0.00000000
                     30	0.00000000	0.00000000	0.00000000	0.00000000	0.00000000	0.00000000	0.00000000
                     35	0.00000000	0.00000000	0.00000000	0.00000000	0.00000000	0.00000000	0.00000000
                     40	0.00000000	0.00000000	0.00000000	0.00000000	0.00000000	0.00000000	0.00000000
                     60	0.00000000	0.00000000	0.00000000	0.00000000	0.00000000	0.00000000	0.00000000
              </tableData>
              <tableData breakPoint="25">
                               -7	        -5	        -2	         0	         2	         5	         7
                    -10	-0.00752000	-0.00869000	-0.01030000	-0.01111000	-0.01202000	-0.01310000	-0.01396000
                     -5	0.00896000	0.00894000	0.00547000	0.00405000	0.00246000	0.00287000	0.00097000
                     -2	0.01739000	0.01647000	0.01496000	0.01392000	0.01282000	0.01137000	0.01029000
                      0	0.02329000	0.02241000	0.02123000	0.01991000	0.01876000	0.01747000	0.01618000
                      2	0.02932000	0.02846000	0.02709000	0.02593000	0.02472000	0.02321000	0.02202000
                      4	0.03522000	0.03433000	0.03286000	0.03182000	0.03059000	0.02890000	0.02771000
                      6	0.04089000	0.04010000	0.03859000	0.03751000	0.03633000	0.03454000	0.03319000
                      8	0.04648000	0.04564000	0.04418000	0.04305000	0.04185000	0.03997000	0.03851000
                     10	0.05181000	0.05106000	0.04960000	0.04846000	0.04719000	0.04524000	0.04385000
                     12	0.05740000	0.05631000	0.05482000	0.05371000	0.05240000	0.05045000	0.04868000
                     16	0.06661000	0.06594000	0.06446000	0.06341000	0.06213000	0.05997000	0.05847000
                     18	0.07046000	0.07055000	0.06894000	0.06786000	0.06661000	0.06439000	0.06271000
                     20	0.07563000	0.07477000	0.07326000	0.07207000	0.07078000	0.06870000	0.06712000
                     22	0.07926000	0.07884000	0.07717000	0.07610000	0.07482000	0.07270000	0.07083000
                     24	0.08293000	0.08227000	0.08080000	0.07973000	0.07833000	0.07617000	0.07441000
                     26	0.08502000	0.08556000	0.08403000	0.08308000	0.08172000	0.07981000	0.07731000
                     28	0.08900000	0.08846000	0.08713000	0.08600000	0.08459000	0.08267000	0.08018000
                     30	0.09212000	0.09098000	0.08980000	0.08878000	0.08707000	0.08507000	0.08341000
                     35	0.09745000	0.09614000	0.09509000	0.09395000	0.09192000	0.08967000	0.08728000
                     40	0.09994000	0.09992000	0.09738000	0.09572000	0.09448000	0.09265000	0.09008000
                     60	0.07392000	0.07502000	0.07368000	0.07278000	0.06922000	0.06870000	0.06716000
              </tableData>
          </table>
    </function>
    <function name="aero/coefficients/CFXDSBL">
    <description>DRAG DUE TO LOWER SPEEDBRAKE DEFLECTION</description>
    <product>
          <property>fcs/airbrake-lower</property>
          <table>
            <independentVar lookup="row">aero/alpha-deg</independentVar>
            <tableData>
                    -10		0.00019564
                     -5		0.00018709
                     -2		0.00017309
                      0		0.00013055
                      2		0.00017345
                      4		0.00018418
                      6		0.00018655
                      8		0.00019436
                     10		0.00020127
                     12		0.00021473
                     16		0.00021527
                     18		0.00020509
                     20		0.00021018
                     22		0.00023836
                     24		0.00023945
                     26		0.00023982
                     28		0.00024018
                     30		0.00023600
                     35		0.00023800
                     40		0.00021545
                     60		0.00017164
            </tableData>
          </table>
       </product>
    </function>
    <function name="aero/coefficients/CFXDSBU">
    <description>DRAG DUE TO UPPER SPEEDBRAKE DEFLECTION</description>
    <product>
          <property>fcs/airbrake-upper</property>
          <table>
            <independentVar lookup="row">aero/alpha-deg</independentVar>
            <tableData>
                    -10		0.00007162
                     -5		0.00007000
                     -2		0.00006662
                      0		0.00006471
                      2		0.00009618
                      4		0.00007162
                      6		0.00007500
                      8		0.00008000
                     10		0.00007779
                     12		0.00007353
                     16		0.00006015
                     18		0.00006074
                     20		0.00005412
                     22		0.00005000
                     24		0.00004853
                     26		0.00004324
                     28		0.00004471
                     30		0.00003221
                     35		0.00002691
                     40		0.00001721
                     60		0.00001265
            </tableData>
          </table>
       </product>
    </function>
    <function name="aero/coefficients/CFXDSD1L">
    <description>DRAG DUE TO LE SLAT 1</description>
    <product>
          <property>fcs/slat-1L-pos-deg</property>
          <table>
            <independentVar lookup="row">aero/alpha-deg</independentVar>
            <tableData>
                    -10		0.00000000
                     -5		0.00000000
                     -2		0.00000000
                      0		0.00008400
                      2		0.00020800
                      4		0.00035200
                      6		0.00051200
                      8		0.00069600
                     10		0.00090000
                     12		0.00112800
                     16		0.00165600
                     18		0.00194400
                     20		0.00228800
                     22		0.00266000
                     24		0.00298000
                     26		0.00340000
                     28		0.00375200
                     30		0.00419200
                     35		0.00523200
                     40		0.00604800
                     60		0.00734400
            </tableData>
          </table>
       </product>
    </function>
    <function name="aero/coefficients/CFXDSD2L">
    <description>DRAG DUE TO LE SLAT 2</description>
    <product>
          <property>fcs/slat-2L-pos-deg</property>
          <table>
            <independentVar lookup="row">aero/alpha-deg</independentVar>
            <tableData>
                    -10		0.00000000
                     -5		0.00000000
                     -2		0.00000000
                      0		0.00074545
                      2		0.00156061
                      4		0.00234545
                      6		0.00310000
                      8		0.00384545
                     10		0.00458788
                     12		0.00532727
                     16		0.00679091
                     18		0.00751212
                     20		0.00826667
                     22		0.00900909
                     24		0.00972121
                     26		0.01046364
                     28		0.01113030
                     30		0.01175455
                     35		0.01328788
                     40		0.01393636
                     60		0.01334848
            </tableData>
          </table>
       </product>
    </function>
    <function name="aero/coefficients/CFXGEAR">
    <description>DRAG INCREMENT DUE TO GEAR</description>
    <product>
          <property>gear/gear-pos-norm</property>
          <table>
            <independentVar lookup="row">aero/alpha-deg</independentVar>
            <tableData>
                    -10		0.00015571
                     -5		0.00009000
                     -2		0.00006571
                      0		0.00006286
                      2		0.00007286
                      4		0.00009571
                      6		0.00013857
                      8		0.00019571
                     10		0.00026429
                     12		0.00035429
                     16		0.00050571
                     18		0.00063286
                     20		0.00077286
                     22		0.00092714
                     24		0.00103286
                     26		0.00105143
                     28		0.00109000
                     30		0.00123286
                     35		0.00119714
                     40		0.00136429
            </tableData>
          </table>
       </product>
    </function>
    <function name="aero/coefficients/CFXLTNK">
    <description>DRAG INCREMENT DUE TO TANK(LEFT WING)</description>
    <product>
          <property>metrics/stores-wing-tank-left</property>
          <table>
            <independentVar lookup="row">aero/alpha-deg</independentVar>
            <independentVar lookup="column">aero/beta-deg</independentVar>
            <tableData>
                                 -7	         -5	         -2	          0	          2	          5	          7
                    -10	0.00343000	0.00340000	0.00336000	0.00332000	0.00331000	0.00328000	0.00328000
                     -5	0.00325000	0.00321000	0.00320000	0.00319000	0.00317000	0.00317000	0.00317000
                     -2	0.00317000	0.00316000	0.00314000	0.00315000	0.00314000	0.00314000	0.00315000
                      0	0.00315000	0.00314000	0.00314000	0.00314000	0.00314000	0.00315000	0.00316000
                      2	0.00315000	0.00315000	0.00315000	0.00316000	0.00316000	0.00317000	0.00319000
                      4	0.00316000	0.00317000	0.00317000	0.00318000	0.00319000	0.00321000	0.00322000
                      6	0.00320000	0.00320000	0.00321000	0.00322000	0.00324000	0.00327000	0.00329000
                      8	0.00324000	0.00323000	0.00327000	0.00329000	0.00330000	0.00333000	0.00335000
                     10	0.00328000	0.00330000	0.00333000	0.00335000	0.00337000	0.00341000	0.00344000
                     12	0.00339000	0.00341000	0.00342000	0.00344000	0.00347000	0.00350000	0.00355000
                     16	0.00353000	0.00350000	0.00360000	0.00363000	0.00366000	0.00370000	0.00376000
                     18	0.00364000	0.00370000	0.00367000	0.00372000	0.00377000	0.00379000	0.00389000
                     20	0.00379000	0.00379000	0.00381000	0.00387000	0.00390000	0.00401000	0.00409000
                     22	0.00399000	0.00390000	0.00399000	0.00402000	0.00408000	0.00413000	0.00450000
                     24	0.00435000	0.00411000	0.00407000	0.00415000	0.00419000	0.00430000	0.00436000
                     26	0.00400000	0.00424000	0.00430000	0.00433000	0.00441000	0.00460000	0.00448000
                     28	0.00403000	0.00442000	0.00436000	0.00447000	0.00458000	0.00461000	0.00418000
                     30	0.00430000	0.00451000	0.00455000	0.00467000	0.00464000	0.00481000	0.00486000
                     35	0.00462000	0.00493000	0.00518000	0.00508000	0.00516000	0.00548000	0.00530000
                     40	0.00544000	0.00634000	0.00574000	0.00526000	0.00583000	0.00625000	0.00611000
            </tableData>
          </table>
       </product>
    </function>
    <function name="aero/coefficients/CFXmn">
    <description>DRAG DUE TO MACH</description>
          <table>
            <independentVar lookup="row">velocities/mach</independentVar>
            <independentVar lookup="column">aero/alpha-deg</independentVar>
            <tableData>
                                -10	         -1	       0.01	          1	         10
                    0.2	0.00000000	0.00000000	0.00000000	0.00000000	0.00000000
                    0.4	0.00000000	0.00000000	0.00000000	0.00000000	0.00000000
                    0.6	0.00000000	0.00000000	0.00000000	0.00000000	0.00000000
                    0.8	0.00622000	0.00000000	0.00007000	0.00029000	0.00808000
                    0.9	0.01279000	0.00000000	0.00015000	0.00059000	0.01628000
                   0.97	0.02572000	0.00000000	0.00030000	0.00114000	0.03037000
                   0.99	0.04797000	0.00000000	0.00051000	0.00194000	0.05085000
                    1.2	0.10493000	0.00410000	0.00246000	0.00291000	0.09973000
                    1.6	0.08180000	0.00447000	0.00264000	0.00236000	0.07117000
                      2	0.05664000	0.00516000	0.00367000	0.00327000	0.05270000
                    2.2	0.05840000	0.00412000	0.00255000	0.00204000	0.04604000
                    2.5	0.04377000	0.00309000	0.00183000	0.00135000	0.03231000
            </tableData>
          </table>
    </function>
    <function name="aero/coefficients/CFXRTNK">
    <description>DRAG INCREMENT DUE TO TANK(RIGHT WING)</description>
    <product>
          <property>metrics/stores-wing-tank-right</property>
          <table>
            <independentVar lookup="row">aero/alpha-deg</independentVar>
            <independentVar lookup="column">aero/beta-deg</independentVar>
            <tableData>
                                 -7	         -5	         -2	          0	          2	          5	          7
                    -10	0.00327000	0.00329000	0.00331000	0.00333000	0.00336000	0.00339000	0.00343000
                     -5	0.00317000	0.00317000	0.00317000	0.00319000	0.00320000	0.00321000	0.00325000
                     -2	0.00315000	0.00314000	0.00314000	0.00315000	0.00314000	0.00316000	0.00317000
                      0	0.00316000	0.00315000	0.00314000	0.00314000	0.00314000	0.00314000	0.00315000
                      2	0.00319000	0.00317000	0.00316000	0.00316000	0.00315000	0.00315000	0.00315000
                      4	0.00322000	0.00322000	0.00319000	0.00318000	0.00317000	0.00317000	0.00316000
                      6	0.00329000	0.00327000	0.00324000	0.00322000	0.00321000	0.00320000	0.00320000
                      8	0.00335000	0.00332000	0.00331000	0.00329000	0.00327000	0.00325000	0.00324000
                     10	0.00345000	0.00341000	0.00337000	0.00336000	0.00333000	0.00330000	0.00330000
                     12	0.00356000	0.00350000	0.00347000	0.00344000	0.00342000	0.00344000	0.00337000
                     16	0.00375000	0.00366000	0.00367000	0.00361000	0.00359000	0.00354000	0.00353000
                     18	0.00387000	0.00388000	0.00375000	0.00372000	0.00369000	0.00369000	0.00362000
                     20	0.00407000	0.00398000	0.00392000	0.00385000	0.00381000	0.00379000	0.00378000
                     22	0.00432000	0.00413000	0.00408000	0.00402000	0.00399000	0.00391000	0.00424000
                     24	0.00465000	0.00435000	0.00419000	0.00416000	0.00411000	0.00406000	0.00401000
                     26	0.00474000	0.00451000	0.00439000	0.00434000	0.00429000	0.00431000	0.00408000
                     28	0.00446000	0.00466000	0.00451000	0.00447000	0.00440000	0.00433000	0.00429000
                     30	0.00487000	0.00474000	0.00473000	0.00466000	0.00463000	0.00449000	0.00441000
                     35	0.00520000	0.00535000	0.00535000	0.00506000	0.00511000	0.00511000	0.00476000
                     40	0.00604000	0.00647000	0.00545000	0.00551000	0.00567000	0.00663000	0.00536000
            </tableData>
          </table>
       </product>
    </function>
    <function name="aero/coefficients/CFZB">
    <description>BASIC LIFT</description>
          <table>
            <independentVar lookup="row">aero/alpha-deg</independentVar>
            <tableData>
                    -10		-0.51706000
                     -5		-0.24559000
                     -2		-0.06992000
                      0		0.05032000
                      2		0.17337000
                      4		0.29838000
                      6		0.42431000
                      8		0.55076000
                     10		0.67689000
                     12		0.80113000
                     16		1.03959000
                     18		1.15313000
                     20		1.25957000
                     22		1.36068000
                     24		1.45528000
                     26		1.54171000
                     28		1.61953000
                     30		1.68757000
                     35		1.81859000
                     40		1.88572000
                     60		1.54085000
            </tableData>
          </table>
    </function>
    <function name="aero/coefficients/CFZCTNK">
    <description>LIFT INCREMENT DUE TO TANK(CENTRE)</description>
    <product>
          <property>metrics/stores-centre-tank</property>
          <table>
            <independentVar lookup="row">aero/alpha-deg</independentVar>
            <independentVar lookup="column">aero/beta-deg</independentVar>
            <tableData>
                                 -7	         -5	         -2	          0	          2	          5	          7
                    -10	-0.00080000	-0.00077000	-0.00078000	-0.00078000	-0.00076000	-0.00072000	-0.00078000
                     -5	-0.00017000	-0.00039000	-0.00026000	-0.00031000	-0.00028000	-0.00040000	-0.00020000
                     -2	0.00015000	0.00003000	-0.00006000	-0.00004000	-0.00006000	0.00003000	0.00010000
                      0	0.00018000	0.00018000	0.00005000	0.00004000	0.00005000	0.00019000	0.00014000
                      2	0.00028000	0.00023000	0.00014000	0.00014000	0.00014000	0.00020000	0.00029000
                      4	0.00035000	0.00026000	0.00020000	0.00017000	0.00020000	0.00025000	0.00035000
                      6	0.00039000	0.00026000	0.00018000	0.00019000	0.00018000	0.00027000	0.00034000
                      8	0.00034000	0.00015000	0.00017000	0.00016000	0.00016000	0.00031000	0.00040000
                     10	0.00021000	0.00011000	0.00014000	0.00008000	0.00010000	0.00008000	0.00047000
                     12	0.00022000	0.00013000	0.00003000	0.00001000	0.00001000	0.00067000	0.00040000
                     16	-0.00029000	-0.00058000	-0.00032000	-0.00030000	-0.00030000	-0.00027000	-0.00029000
                     18	-0.00046000	-0.00036000	-0.00063000	-0.00063000	-0.00060000	-0.00063000	-0.00053000
                     20	-0.00034000	-0.00054000	-0.00069000	-0.00085000	-0.00079000	-0.00058000	-0.00047000
                     22	0.00040000	-0.00087000	-0.00099000	-0.00103000	-0.00103000	-0.00086000	0.00008000
                     24	-0.00022000	-0.00102000	-0.00133000	-0.00143000	-0.00132000	-0.00118000	-0.00083000
                     26	-0.00174000	-0.00165000	-0.00134000	-0.00151000	-0.00144000	-0.00156000	-0.00111000
                     28	-0.00202000	-0.00176000	-0.00203000	-0.00198000	-0.00179000	-0.00197000	-0.00161000
                     30	-0.00244000	-0.00200000	-0.00232000	-0.00224000	-0.00209000	-0.00210000	-0.00232000
                     35	-0.00294000	-0.00304000	-0.00303000	-0.00318000	-0.00311000	-0.00291000	-0.00296000
                     40	-0.00394000	-0.00261000	-0.00400000	-0.00415000	-0.00391000	-0.00206000	-0.00369000
            </tableData>
          </table>
       </product>
    </function>
    <function name="aero/coefficients/CFZDE2L">
    <description>LIFT DUE TO ELEVON 2L</description>
          <table>
            <independentVar lookup="row">aero/alpha-deg</independentVar>
            <independentVar lookup="column">aero/beta-deg</independentVar>
            <independentVar lookup="table">fcs/elevon-2L-pos-deg</independentVar>
              <tableData breakPoint="-16">
                               -7	        -5	        -2	         0	         2	         5	         7
                    -10	-0.14662000	-0.14914000	-0.15081000	-0.15214000	-0.15302000	-0.15221000	-0.15138000
                     -5	-0.15118000	-0.15272000	-0.15656000	-0.15725000	-0.15733000	-0.15731000	-0.15633000
                     -2	-0.15191000	-0.15436000	-0.15830000	-0.15809000	-0.15798000	-0.15920000	-0.15842000
                      0	-0.15262000	-0.15494000	-0.15921000	-0.15782000	-0.15727000	-0.16019000	-0.15770000
                      2	-0.15485000	-0.15696000	-0.16042000	-0.16057000	-0.16076000	-0.15937000	-0.15854000
                      4	-0.15680000	-0.15887000	-0.16131000	-0.16207000	-0.16205000	-0.16112000	-0.16036000
                      6	-0.15763000	-0.15994000	-0.16212000	-0.16299000	-0.16318000	-0.16217000	-0.16131000
                      8	-0.15814000	-0.16018000	-0.16242000	-0.16350000	-0.16372000	-0.16276000	-0.16162000
                     10	-0.15885000	-0.15958000	-0.16239000	-0.16348000	-0.16373000	-0.16184000	-0.16259000
                     12	-0.15787000	-0.15996000	-0.16184000	-0.16285000	-0.16341000	-0.16130000	-0.16129000
                     16	-0.15481000	-0.15844000	-0.15842000	-0.15963000	-0.16003000	-0.15973000	-0.15841000
                     18	-0.15258000	-0.15461000	-0.15640000	-0.15737000	-0.15848000	-0.15826000	-0.15999000
                     20	-0.15021000	-0.15174000	-0.15351000	-0.15441000	-0.15431000	-0.15431000	-0.15076000
                     22	-0.14670000	-0.14736000	-0.15013000	-0.15121000	-0.15095000	-0.15071000	-0.15111000
                     24	-0.13931000	-0.14570000	-0.14676000	-0.14776000	-0.14832000	-0.15030000	-0.14709000
                     26	-0.13602000	-0.13942000	-0.14271000	-0.14332000	-0.14393000	-0.14389000	-0.14360000
                     28	-0.13610000	-0.13539000	-0.13795000	-0.13893000	-0.13937000	-0.14022000	-0.13750000
                     30	-0.12818000	-0.12992000	-0.13277000	-0.13428000	-0.13380000	-0.13503000	-0.12753000
                     35	-0.11761000	-0.11770000	-0.11996000	-0.12084000	-0.12221000	-0.12149000	-0.12007000
                     40	-0.10077000	-0.10283000	-0.10546000	-0.10612000	-0.10590000	-0.10504000	-0.10347000
                     60	-0.04644000	-0.04846000	-0.04513000	-0.03645000	-0.04573000	-0.04934000	-0.04750000
              </tableData>
              <tableData breakPoint="0">
                               -7	        -5	        -2	         0	         2	         5	         7
                    -10	0.00000000	0.00000000	0.00000000	0.00000000	0.00000000	0.00000000	0.00000000
                     -5	0.00000000	0.00000000	0.00000000	0.00000000	0.00000000	0.00000000	0.00000000
                     -2	0.00000000	0.00000000	0.00000000	0.00000000	0.00000000	0.00000000	0.00000000
                      0	0.00000000	0.00000000	0.00000000	0.00000000	0.00000000	0.00000000	0.00000000
                      2	0.00000000	0.00000000	0.00000000	0.00000000	0.00000000	0.00000000	0.00000000
                      4	0.00000000	0.00000000	0.00000000	0.00000000	0.00000000	0.00000000	0.00000000
                      6	0.00000000	0.00000000	0.00000000	0.00000000	0.00000000	0.00000000	0.00000000
                      8	0.00000000	0.00000000	0.00000000	0.00000000	0.00000000	0.00000000	0.00000000
                     10	0.00000000	0.00000000	0.00000000	0.00000000	0.00000000	0.00000000	0.00000000
                     12	0.00000000	0.00000000	0.00000000	0.00000000	0.00000000	0.00000000	0.00000000
                     16	0.00000000	0.00000000	0.00000000	0.00000000	0.00000000	0.00000000	0.00000000
                     18	0.00000000	0.00000000	0.00000000	0.00000000	0.00000000	0.00000000	0.00000000
                     20	0.00000000	0.00000000	0.00000000	0.00000000	0.00000000	0.00000000	0.00000000
                     22	0.00000000	0.00000000	0.00000000	0.00000000	0.00000000	0.00000000	0.00000000
                     24	0.00000000	0.00000000	0.00000000	0.00000000	0.00000000	0.00000000	0.00000000
                     26	0.00000000	0.00000000	0.00000000	0.00000000	0.00000000	0.00000000	0.00000000
                     28	0.00000000	0.00000000	0.00000000	0.00000000	0.00000000	0.00000000	0.00000000
                     30	0.00000000	0.00000000	0.00000000	0.00000000	0.00000000	0.00000000	0.00000000
                     35	0.00000000	0.00000000	0.00000000	0.00000000	0.00000000	0.00000000	0.00000000
                     40	0.00000000	0.00000000	0.00000000	0.00000000	0.00000000	0.00000000	0.00000000
                     60	0.00000000	0.00000000	0.00000000	0.00000000	0.00000000	0.00000000	0.00000000
              </tableData>
              <tableData breakPoint="25">
                               -7	        -5	        -2	         0	         2	         5	         7
                    -10	0.22133000	0.22439000	0.22824000	0.22962000	0.23081000	0.23035000	0.22955000
                     -5	0.22162000	0.22406000	0.22890000	0.23074000	0.23148000	0.23066000	0.23019000
                     -2	0.21903000	0.22264000	0.22837000	0.22876000	0.22834000	0.23031000	0.22828000
                      0	0.21920000	0.22156000	0.22906000	0.22696000	0.22605000	0.22975000	0.22617000
                      2	0.22103000	0.22254000	0.22934000	0.22866000	0.22869000	0.22797000	0.22683000
                      4	0.22106000	0.22437000	0.22650000	0.22794000	0.22797000	0.22790000	0.22628000
                      6	0.21999000	0.22343000	0.22580000	0.22676000	0.22729000	0.22645000	0.22428000
                      8	0.21709000	0.22087000	0.22331000	0.22444000	0.22497000	0.22421000	0.22178000
                     10	0.21492000	0.21686000	0.22004000	0.22127000	0.22155000	0.22073000	0.21864000
                     12	0.20971000	0.21278000	0.21594000	0.21740000	0.21779000	0.21658000	0.21501000
                     16	0.19903000	0.20251000	0.20493000	0.20674000	0.20735000	0.20490000	0.20434000
                     18	0.19148000	0.19584000	0.19786000	0.19958000	0.20066000	0.19945000	0.19871000
                     20	0.18631000	0.18735000	0.19033000	0.19234000	0.19325000	0.19313000	0.19208000
                     22	0.17834000	0.18286000	0.18380000	0.18504000	0.18594000	0.18755000	0.18656000
                     24	0.17122000	0.17145000	0.17540000	0.17709000	0.17761000	0.17688000	0.18074000
                     26	0.16004000	0.16379000	0.16772000	0.16863000	0.16941000	0.17132000	0.17190000
                     28	0.15315000	0.15544000	0.15911000	0.15999000	0.16097000	0.16281000	0.15849000
                     30	0.14588000	0.14471000	0.15030000	0.15107000	0.15219000	0.15269000	0.15532000
                     35	0.12441000	0.12222000	0.12828000	0.12852000	0.12958000	0.13111000	0.12797000
                     40	0.10404000	0.10398000	0.10524000	0.10626000	0.10642000	0.10772000	0.10809000
                     60	0.02870000	0.02890000	0.03363000	0.03193000	0.03447000	0.03566000	0.03010000
              </tableData>
          </table>
    </function>
    <function name="aero/coefficients/CFZDE2R">
    <description>LIFT DUE TO ELEVON 2R</description>
          <table>
            <independentVar lookup="row">aero/alpha-deg</independentVar>
            <independentVar lookup="column">aero/beta-deg</independentVar>
            <independentVar lookup="table">fcs/elevon-2R-pos-deg</independentVar>
              <tableData breakPoint="-16">
                               -7	        -5	        -2	         0	         2	         5	         7
                    -10	-0.14662000	-0.14914000	-0.15081000	-0.15214000	-0.15302000	-0.15221000	-0.15138000
                     -5	-0.15118000	-0.15272000	-0.15656000	-0.15725000	-0.15733000	-0.15731000	-0.15633000
                     -2	-0.15191000	-0.15436000	-0.15830000	-0.15809000	-0.15798000	-0.15920000	-0.15842000
                      0	-0.15262000	-0.15494000	-0.15921000	-0.15782000	-0.15727000	-0.16019000	-0.15770000
                      2	-0.15485000	-0.15696000	-0.16042000	-0.16057000	-0.16076000	-0.15937000	-0.15854000
                      4	-0.15680000	-0.15887000	-0.16131000	-0.16207000	-0.16205000	-0.16112000	-0.16036000
                      6	-0.15763000	-0.15994000	-0.16212000	-0.16299000	-0.16318000	-0.16217000	-0.16131000
                      8	-0.15814000	-0.16018000	-0.16242000	-0.16350000	-0.16372000	-0.16276000	-0.16162000
                     10	-0.15885000	-0.15958000	-0.16239000	-0.16348000	-0.16373000	-0.16184000	-0.16259000
                     12	-0.15787000	-0.15996000	-0.16184000	-0.16285000	-0.16341000	-0.16130000	-0.16129000
                     16	-0.15481000	-0.15844000	-0.15842000	-0.15963000	-0.16003000	-0.15973000	-0.15841000
                     18	-0.15258000	-0.15461000	-0.15640000	-0.15737000	-0.15848000	-0.15826000	-0.15999000
                     20	-0.15021000	-0.15174000	-0.15351000	-0.15441000	-0.15431000	-0.15431000	-0.15076000
                     22	-0.14670000	-0.14736000	-0.15013000	-0.15121000	-0.15095000	-0.15071000	-0.15111000
                     24	-0.13931000	-0.14570000	-0.14676000	-0.14776000	-0.14832000	-0.15030000	-0.14709000
                     26	-0.13602000	-0.13942000	-0.14271000	-0.14332000	-0.14393000	-0.14389000	-0.14360000
                     28	-0.13610000	-0.13539000	-0.13795000	-0.13893000	-0.13937000	-0.14022000	-0.13750000
                     30	-0.12818000	-0.12992000	-0.13277000	-0.13428000	-0.13380000	-0.13503000	-0.12753000
                     35	-0.11761000	-0.11770000	-0.11996000	-0.12084000	-0.12221000	-0.12149000	-0.12007000
                     40	-0.10077000	-0.10283000	-0.10546000	-0.10612000	-0.10590000	-0.10504000	-0.10347000
                     60	-0.04644000	-0.04846000	-0.04513000	-0.03645000	-0.04573000	-0.04934000	-0.04750000
              </tableData>
              <tableData breakPoint="0">
                               -7	        -5	        -2	         0	         2	         5	         7
                    -10	0.00000000	0.00000000	0.00000000	0.00000000	0.00000000	0.00000000	0.00000000
                     -5	0.00000000	0.00000000	0.00000000	0.00000000	0.00000000	0.00000000	0.00000000
                     -2	0.00000000	0.00000000	0.00000000	0.00000000	0.00000000	0.00000000	0.00000000
                      0	0.00000000	0.00000000	0.00000000	0.00000000	0.00000000	0.00000000	0.00000000
                      2	0.00000000	0.00000000	0.00000000	0.00000000	0.00000000	0.00000000	0.00000000
                      4	0.00000000	0.00000000	0.00000000	0.00000000	0.00000000	0.00000000	0.00000000
                      6	0.00000000	0.00000000	0.00000000	0.00000000	0.00000000	0.00000000	0.00000000
                      8	0.00000000	0.00000000	0.00000000	0.00000000	0.00000000	0.00000000	0.00000000
                     10	0.00000000	0.00000000	0.00000000	0.00000000	0.00000000	0.00000000	0.00000000
                     12	0.00000000	0.00000000	0.00000000	0.00000000	0.00000000	0.00000000	0.00000000
                     16	0.00000000	0.00000000	0.00000000	0.00000000	0.00000000	0.00000000	0.00000000
                     18	0.00000000	0.00000000	0.00000000	0.00000000	0.00000000	0.00000000	0.00000000
                     20	0.00000000	0.00000000	0.00000000	0.00000000	0.00000000	0.00000000	0.00000000
                     22	0.00000000	0.00000000	0.00000000	0.00000000	0.00000000	0.00000000	0.00000000
                     24	0.00000000	0.00000000	0.00000000	0.00000000	0.00000000	0.00000000	0.00000000
                     26	0.00000000	0.00000000	0.00000000	0.00000000	0.00000000	0.00000000	0.00000000
                     28	0.00000000	0.00000000	0.00000000	0.00000000	0.00000000	0.00000000	0.00000000
                     30	0.00000000	0.00000000	0.00000000	0.00000000	0.00000000	0.00000000	0.00000000
                     35	0.00000000	0.00000000	0.00000000	0.00000000	0.00000000	0.00000000	0.00000000
                     40	0.00000000	0.00000000	0.00000000	0.00000000	0.00000000	0.00000000	0.00000000
                     60	0.00000000	0.00000000	0.00000000	0.00000000	0.00000000	0.00000000	0.00000000
              </tableData>
              <tableData breakPoint="25">
                               -7	        -5	        -2	         0	         2	         5	         7
                    -10	0.22133000	0.22439000	0.22824000	0.22962000	0.23081000	0.23035000	0.22955000
                     -5	0.22162000	0.22406000	0.22890000	0.23074000	0.23148000	0.23066000	0.23019000
                     -2	0.21903000	0.22264000	0.22837000	0.22876000	0.22834000	0.23031000	0.22828000
                      0	0.21920000	0.22156000	0.22906000	0.22696000	0.22605000	0.22975000	0.22617000
                      2	0.22103000	0.22254000	0.22934000	0.22866000	0.22869000	0.22797000	0.22683000
                      4	0.22106000	0.22437000	0.22650000	0.22794000	0.22797000	0.22790000	0.22628000
                      6	0.21999000	0.22343000	0.22580000	0.22676000	0.22729000	0.22645000	0.22428000
                      8	0.21709000	0.22087000	0.22331000	0.22444000	0.22497000	0.22421000	0.22178000
                     10	0.21492000	0.21686000	0.22004000	0.22127000	0.22155000	0.22073000	0.21864000
                     12	0.20971000	0.21278000	0.21594000	0.21740000	0.21779000	0.21658000	0.21501000
                     16	0.19903000	0.20251000	0.20493000	0.20674000	0.20735000	0.20490000	0.20434000
                     18	0.19148000	0.19584000	0.19786000	0.19958000	0.20066000	0.19945000	0.19871000
                     20	0.18631000	0.18735000	0.19033000	0.19234000	0.19325000	0.19313000	0.19208000
                     22	0.17834000	0.18286000	0.18380000	0.18504000	0.18594000	0.18755000	0.18656000
                     24	0.17122000	0.17145000	0.17540000	0.17709000	0.17761000	0.17688000	0.18074000
                     26	0.16004000	0.16379000	0.16772000	0.16863000	0.16941000	0.17132000	0.17190000
                     28	0.15315000	0.15544000	0.15911000	0.15999000	0.16097000	0.16281000	0.15849000
                     30	0.14588000	0.14471000	0.15030000	0.15107000	0.15219000	0.15269000	0.15532000
                     35	0.12441000	0.12222000	0.12828000	0.12852000	0.12958000	0.13111000	0.12797000
                     40	0.10404000	0.10398000	0.10524000	0.10626000	0.10642000	0.10772000	0.10809000
                     60	0.02870000	0.02890000	0.03363000	0.03193000	0.03447000	0.03566000	0.03010000
              </tableData>
          </table>
    </function>
    <function name="aero/coefficients/CFZDED1L">
    <description>LIFT DUE TO ELEVON 1L</description>
          <table>
            <independentVar lookup="row">aero/alpha-deg</independentVar>
            <independentVar lookup="column">aero/beta-deg</independentVar>
            <independentVar lookup="table">fcs/elevon-1L-pos-deg</independentVar>
              <tableData breakPoint="-16">
                               -7	        -5	        -2	         0	         2	         5	         7
                    -10	-0.09868000	-0.10020000	-0.10086000	-0.10094000	-0.10135000	-0.10082000	-0.10043000
                      2	-0.10664000	-0.10753000	-0.10964000	-0.11008000	-0.11037000	-0.10954000	-0.10906000
                     10	-0.11005000	-0.11125000	-0.11189000	-0.11242000	-0.11251000	-0.11190000	-0.11095000
                     20	-0.10485000	-0.10692000	-0.10709000	-0.10734000	-0.10776000	-0.10668000	-0.10771000
                     28	-0.09481000	-0.09463000	-0.09612000	-0.09681000	-0.09646000	-0.09711000	-0.09762000
                     60	-0.02415000	-0.02250000	-0.02548000	-0.02607000	-0.02657000	-0.02379000	-0.02853000
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              </tableData>
              <tableData breakPoint="0">
                               -7	        -5	        -2	         0	         2	         5	         7
                    -10	0.00000000	0.00000000	0.00000000	0.00000000	0.00000000	0.00000000	0.00000000
                      2	0.00000000	0.00000000	0.00000000	0.00000000	0.00000000	0.00000000	0.00000000
                     10	0.00000000	0.00000000	0.00000000	0.00000000	0.00000000	0.00000000	0.00000000
                     20	0.00000000	0.00000000	0.00000000	0.00000000	0.00000000	0.00000000	0.00000000
                     28	0.00000000	0.00000000	0.00000000	0.00000000	0.00000000	0.00000000	0.00000000
                     60	0.00000000	0.00000000	0.00000000	0.00000000	0.00000000	0.00000000	0.00000000
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              </tableData>
              <tableData breakPoint="25">
                               -7	        -5	        -2	         0	         2	         5	         7
                    -10	0.15229000	0.15399000	0.15563000	0.15673000	0.15682000	0.15594000	0.15532000
                      2	0.15236000	0.15464000	0.15744000	0.15763000	0.15867000	0.15727000	0.15668000
                     10	0.14782000	0.15088000	0.15156000	0.15240000	0.15231000	0.15168000	0.15013000
                     20	0.12962000	0.13118000	0.13286000	0.13372000	0.13414000	0.13324000	0.13203000
                     28	0.10481000	0.10834000	0.11045000	0.11115000	0.11131000	0.11154000	0.11009000
                     60	0.01536000	0.01737000	0.01680000	0.01717000	0.01198000	0.01822000	0.01579000
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              </tableData>
          </table>
    </function>
    <function name="aero/coefficients/CFZDED1R">
    <description>LIFT DUE TO ELEVON 1R</description>
          <table>
            <independentVar lookup="row">aero/alpha-deg</independentVar>
            <independentVar lookup="column">aero/beta-deg</independentVar>
            <independentVar lookup="table">fcs/elevon-1R-pos-deg</independentVar>
              <tableData breakPoint="-16">
                               -7	        -5	        -2	         0	         2	         5	         7
                    -10	-0.09868000	-0.10020000	-0.10086000	-0.10094000	-0.10135000	-0.10082000	-0.10043000
                      2	-0.10664000	-0.10753000	-0.10964000	-0.11008000	-0.11037000	-0.10954000	-0.10906000
                     10	-0.11005000	-0.11125000	-0.11189000	-0.11242000	-0.11251000	-0.11190000	-0.11095000
                     20	-0.10485000	-0.10692000	-0.10709000	-0.10734000	-0.10776000	-0.10668000	-0.10771000
                     28	-0.09481000	-0.09463000	-0.09612000	-0.09681000	-0.09646000	-0.09711000	-0.09762000
                     60	-0.02415000	-0.02250000	-0.02548000	-0.02607000	-0.02657000	-0.02379000	-0.02853000
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              </tableData>
              <tableData breakPoint="0">
                               -7	        -5	        -2	         0	         2	         5	         7
                    -10	0.00000000	0.00000000	0.00000000	0.00000000	0.00000000	0.00000000	0.00000000
                      2	0.00000000	0.00000000	0.00000000	0.00000000	0.00000000	0.00000000	0.00000000
                     10	0.00000000	0.00000000	0.00000000	0.00000000	0.00000000	0.00000000	0.00000000
                     20	0.00000000	0.00000000	0.00000000	0.00000000	0.00000000	0.00000000	0.00000000
                     28	0.00000000	0.00000000	0.00000000	0.00000000	0.00000000	0.00000000	0.00000000
                     60	0.00000000	0.00000000	0.00000000	0.00000000	0.00000000	0.00000000	0.00000000
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              </tableData>
              <tableData breakPoint="25">
                               -7	        -5	        -2	         0	         2	         5	         7
                    -10	0.15229000	0.15399000	0.15563000	0.15673000	0.15682000	0.15594000	0.15532000
                      2	0.15236000	0.15464000	0.15744000	0.15763000	0.15867000	0.15727000	0.15668000
                     10	0.14782000	0.15088000	0.15156000	0.15240000	0.15231000	0.15168000	0.15013000
                     20	0.12962000	0.13118000	0.13286000	0.13372000	0.13414000	0.13324000	0.13203000
                     28	0.10481000	0.10834000	0.11045000	0.11115000	0.11131000	0.11154000	0.11009000
                     60	0.01536000	0.01737000	0.01680000	0.01717000	0.01198000	0.01822000	0.01579000
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              </tableData>
          </table>
    </function>
    <function name="aero/coefficients/CFZDEL">
    <description>LIFT DUE TO LOWER SPEEDBRAKE DEFLECTION</description>
    <product>
          <property>fcs/airbrake-lower</property>
          <table>
            <independentVar lookup="row">aero/alpha-deg</independentVar>
            <tableData>
                    -10		-0.00019673
                     -5		-0.00030473
                      4		-0.00046800
                     12		-0.00047691
                     22		-0.00059200
                     30		-0.00060636
                     60		-0.00036782
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            </tableData>
          </table>
       </product>
    </function>
    <function name="aero/coefficients/CFZDSBU">
    <description>LIFT DUE TO UPPER SPEEDBRAKE DEFLECTION</description>
    <product>
          <property>fcs/airbrake-upper</property>
          <table>
            <independentVar lookup="row">aero/alpha-deg</independentVar>
            <tableData>
                    -10		0.00006779
                     -5		0.00011721
                      4		0.00011456
                     12		0.00004029
                     22		-0.00000147
                     30		-0.00000118
                     60		0.00002235
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            </tableData>
          </table>
       </product>
    </function>
    <function name="aero/coefficients/CFZDSD1L">
    <description>LIFT DUE TO LE SLAT 1</description>
    <product>
          <property>fcs/slat-1L-pos-deg</property>
          <table>
            <independentVar lookup="row">aero/alpha-deg</independentVar>
            <tableData>
                    -10		0.00670000
                     -5		0.00475600
                      4		0.00466800
                     12		0.00854000
                     22		0.01797200
                     30		0.02786000
                     60		0.05847600
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            </tableData>
          </table>
       </product>
    </function>
    <function name="aero/coefficients/CFZDSD2L">
    <description>LIFT DUE TO LE SLAT 2</description>
    <product>
          <property>fcs/slat-2L-pos-deg</property>
          <table>
            <independentVar lookup="row">aero/alpha-deg</independentVar>
            <tableData>
                    -10		0.05776667
                     -5		0.04364545
                      4		0.03005152
                     12		0.03393030
                     22		0.05901818
                     30		0.09288182
                     60		0.22701818
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            </tableData>
          </table>
       </product>
    </function>
    <function name="aero/coefficients/CFZGEAR">
    <description>LIFT INCREMENT DUE TO GEAR</description>
    <product>
          <property>gear/gear-pos-norm</property>
          <table>
            <independentVar lookup="row">aero/alpha-deg</independentVar>
            <tableData>
                    -10		-0.00324000
                     -5		-0.00173857
                      2		0.00064000
                      8		0.00248429
                     16		0.00438571
                     22		0.00575000
                     28		0.00597286
                     40		0.00619000
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            </tableData>
          </table>
       </product>
    </function>
    <function name="aero/coefficients/CFZLTNK">
    <description>LIFT INCREMENT DUE TO TANK(LEFT WING)</description>
    <product>
          <property>metrics/stores-wing-tank-left</property>
          <table>
            <independentVar lookup="row">aero/alpha-deg</independentVar>
            <independentVar lookup="column">aero/beta-deg</independentVar>
            <tableData>
                                 -7	         -5	         -2	          0	          2	          5	          7
                    -10	-0.00616000	-0.00543000	-0.00440000	-0.00364000	-0.00318000	-0.00242000	-0.00204000
                      2	-0.00012000	0.00006000	0.00019000	0.00024000	0.00023000	0.00010000	-0.00001000
                     10	-0.00033000	-0.00034000	-0.00072000	-0.00103000	-0.00145000	-0.00232000	-0.00254000
                     20	-0.00422000	-0.00496000	-0.00623000	-0.00701000	-0.00778000	-0.00903000	-0.01012000
                     28	-0.01017000	-0.01099000	-0.01300000	-0.01409000	-0.01509000	-0.01715000	-0.01930000
                     40	-0.02050000	-0.02059000	-0.02374000	-0.02573000	-0.02659000	-0.02858000	-0.02999000
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            </tableData>
          </table>
       </product>
    </function>
    <function name="aero/coefficients/CFZmn">
    <description>LIFT DUE TO MACH</description>
          <table>
            <independentVar lookup="row">velocities/mach</independentVar>
            <independentVar lookup="column">aero/alpha-deg</independentVar>
            <tableData>
                                -10	         -1	       0.01	          1	         10
                    0.2	0.03202000	-0.00015000	-0.00421000	-0.00814000	-0.04180000
                    0.6	0.00000000	0.00000000	0.00000000	0.00000000	0.00000000
                    0.9	-0.08248000	0.00156000	0.01153000	0.02121000	0.10625000
                   0.99	-0.24329000	0.00390000	0.03252000	0.06045000	0.29894000
                    1.6	-0.12533000	-0.02852000	-0.01854000	-0.00943000	0.04000000
                    2.2	-0.04082000	-0.05515000	-0.05800000	-0.06129000	-0.11795000
                    2.5	0.04675000	-0.04363000	-0.05533000	-0.06737000	-0.20095000
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            </tableData>
          </table>
    </function>
    <function name="aero/coefficients/CFZRTNK">
    <description>LIFT INCREMENT DUE TO TANK(RIGHT WING)</description>
    <product>
          <property>metrics/stores-wing-tank-right</property>
          <table>
            <independentVar lookup="row">aero/alpha-deg</independentVar>
            <independentVar lookup="column">aero/beta-deg</independentVar>
            <tableData>
                                 -7	         -5	         -2	          0	          2	          5	          7
                    -10	-0.00200000	-0.00245000	-0.00321000	-0.00368000	-0.00436000	-0.00542000	-0.00616000
                      2	-0.00001000	0.00013000	0.00023000	0.00024000	0.00019000	0.00004000	-0.00012000
                     10	-0.00274000	-0.00227000	-0.00144000	-0.00102000	-0.00073000	-0.00037000	-0.00001000
                     20	-0.01011000	-0.00909000	-0.00778000	-0.00705000	-0.00620000	-0.00495000	-0.00431000
                     28	-0.01882000	-0.01672000	-0.01525000	-0.01407000	-0.01296000	-0.01144000	-0.01003000
                     40	-0.02993000	-0.02812000	-0.02722000	-0.02561000	-0.02378000	-0.02038000	-0.02050000
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            </tableData>
          </table>
       </product>
    </function>
    <function name="aero/coefficients/CMM1">
    <description>BASIC PITCHING MOMENT</description>
          <table>
            <independentVar lookup="row">aero/alpha-deg</independentVar>
            <tableData>
                    -20		0.06594000
                    -10		0.03297000
                      2		-0.04016000
                     10		-0.07417000
                     20		-0.10163000
                     28		-0.11010000
                     60		-0.15367000
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            </tableData>
          </table>
    </function>
    <function name="aero/coefficients/CMMCTNK">
    <description>PITCHING MOMENT INCREMENT DUE TO TANK(CENTRE)</description>
    <product>
          <property>metrics/stores-centre-tank</property>
          <table>
            <independentVar lookup="row">aero/alpha-deg</independentVar>
            <independentVar lookup="column">aero/beta-deg</independentVar>
            <tableData>
                                 -7	         -5	         -2	          0	          2	          5	          7
                    -10	0.00065000	0.00059000	0.00053000	0.00047000	0.00051000	0.00059000	0.00062000
                      2	-0.00020000	-0.00021000	-0.00022000	-0.00020000	-0.00021000	-0.00021000	-0.00019000
                     10	-0.00083000	-0.00063000	-0.00060000	-0.00059000	-0.00060000	-0.00059000	-0.00053000
                     20	-0.00120000	-0.00099000	-0.00096000	-0.00087000	-0.00092000	-0.00096000	-0.00098000
                     28	-0.00154000	-0.00136000	-0.00095000	-0.00105000	-0.00107000	-0.00118000	-0.00148000
                     40	-0.00118000	-0.00191000	-0.00108000	-0.00115000	-0.00110000	-0.00223000	-0.00137000
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            </tableData>
          </table>
       </product>
    </function>
    <function name="aero/coefficients/CMMDED1L">
    <description>PITCH MOMENT DUE TO ELEVON 1L</description>
          <table>
            <independentVar lookup="row">aero/alpha-deg</independentVar>
            <independentVar lookup="column">aero/beta-deg</independentVar>
            <independentVar lookup="table">fcs/elevon-1L-pos-deg</independentVar>
              <tableData breakPoint="-16">
                               -7	        -5	        -2	         0	         2	         5	         7
                    -10	0.06267000	0.06360000	0.06330000	0.06343000	0.06318000	0.06266000	0.06217000
                      2	0.06519000	0.06550000	0.06554000	0.06577000	0.06592000	0.06500000	0.06474000
                     10	0.06404000	0.06409000	0.06479000	0.06475000	0.06459000	0.06345000	0.06338000
                     20	0.05766000	0.05821000	0.05809000	0.05788000	0.05779000	0.05690000	0.05722000
                     28	0.05012000	0.04925000	0.04933000	0.04900000	0.04838000	0.04882000	0.04873000
                     60	0.01501000	0.01259000	0.01580000	0.01673000	0.01624000	0.01128000	0.01514000
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              </tableData>
              <tableData breakPoint="0">
                               -7	        -5	        -2	         0	         2	         5	         7
                    -10	0.00000000	0.00000000	0.00000000	0.00000000	0.00000000	0.00000000	0.00000000
                      2	0.00000000	0.00000000	0.00000000	0.00000000	0.00000000	0.00000000	0.00000000
                     10	0.00000000	0.00000000	0.00000000	0.00000000	0.00000000	0.00000000	0.00000000
                     20	0.00000000	0.00000000	0.00000000	0.00000000	0.00000000	0.00000000	0.00000000
                     28	0.00000000	0.00000000	0.00000000	0.00000000	0.00000000	0.00000000	0.00000000
                     60	0.00000000	0.00000000	0.00000000	0.00000000	0.00000000	0.00000000	0.00000000
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              </tableData>
              <tableData breakPoint="25">
                               -7	        -5	        -2	         0	         2	         5	         7
                    -10	-0.09737000	-0.09798000	-0.09871000	-0.09867000	-0.09859000	-0.09781000	-0.09696000
                      2	-0.09528000	-0.09575000	-0.09599000	-0.09596000	-0.09618000	-0.09498000	-0.09457000
                     10	-0.08970000	-0.08950000	-0.09016000	-0.09008000	-0.08969000	-0.08849000	-0.08781000
                     20	-0.07422000	-0.07452000	-0.07418000	-0.07424000	-0.07392000	-0.07349000	-0.07258000
                     28	-0.05657000	-0.05843000	-0.05840000	-0.05834000	-0.05809000	-0.05740000	-0.05543000
                     60	-0.01260000	-0.01314000	-0.01267000	-0.01488000	-0.00474000	-0.00993000	-0.01082000
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              </tableData>
          </table>
    </function>
    <function name="aero/coefficients/CMMDED1R">
    <description>PITCH MOMENT DUE TO ELEVON 1R</description>
          <table>
            <independentVar lookup="row">aero/alpha-deg</independentVar>
            <independentVar lookup="column">aero/beta-deg</independentVar>
            <independentVar lookup="table">fcs/elevon-1R-pos-deg</independentVar>
              <tableData breakPoint="-16">
                               -7	        -5	        -2	         0	         2	         5	         7
                    -10	0.06267000	0.06360000	0.06330000	0.06343000	0.06318000	0.06266000	0.06217000
                      2	0.06519000	0.06550000	0.06554000	0.06577000	0.06592000	0.06500000	0.06474000
                     10	0.06404000	0.06409000	0.06479000	0.06475000	0.06459000	0.06345000	0.06338000
                     20	0.05766000	0.05821000	0.05809000	0.05788000	0.05779000	0.05690000	0.05722000
                     28	0.05012000	0.04925000	0.04933000	0.04900000	0.04838000	0.04882000	0.04873000
                     60	0.01501000	0.01259000	0.01580000	0.01673000	0.01624000	0.01128000	0.01514000
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              </tableData>
              <tableData breakPoint="0">
                               -7	        -5	        -2	         0	         2	         5	         7
                    -10	0.00000000	0.00000000	0.00000000	0.00000000	0.00000000	0.00000000	0.00000000
                      2	0.00000000	0.00000000	0.00000000	0.00000000	0.00000000	0.00000000	0.00000000
                     10	0.00000000	0.00000000	0.00000000	0.00000000	0.00000000	0.00000000	0.00000000
                     20	0.00000000	0.00000000	0.00000000	0.00000000	0.00000000	0.00000000	0.00000000
                     28	0.00000000	0.00000000	0.00000000	0.00000000	0.00000000	0.00000000	0.00000000
                     60	0.00000000	0.00000000	0.00000000	0.00000000	0.00000000	0.00000000	0.00000000
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              </tableData>
              <tableData breakPoint="25">
                               -7	        -5	        -2	         0	         2	         5	         7
                    -10	-0.09737000	-0.09798000	-0.09871000	-0.09867000	-0.09859000	-0.09781000	-0.09696000
                      2	-0.09528000	-0.09575000	-0.09599000	-0.09596000	-0.09618000	-0.09498000	-0.09457000
                     10	-0.08970000	-0.08950000	-0.09016000	-0.09008000	-0.08969000	-0.08849000	-0.08781000
                     20	-0.07422000	-0.07452000	-0.07418000	-0.07424000	-0.07392000	-0.07349000	-0.07258000
                     28	-0.05657000	-0.05843000	-0.05840000	-0.05834000	-0.05809000	-0.05740000	-0.05543000
                     60	-0.01260000	-0.01314000	-0.01267000	-0.01488000	-0.00474000	-0.00993000	-0.01082000
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              </tableData>
          </table>
    </function>
    <function name="aero/coefficients/CMMDED2L">
    <description>PITCH MOMENT DUE TO ELEVON 2L</description>
          <table>
            <independentVar lookup="row">aero/alpha-deg</independentVar>
            <independentVar lookup="column">aero/beta-deg</independentVar>
            <independentVar lookup="table">fcs/elevon-2L-pos-deg</independentVar>
              <tableData breakPoint="-16">
                               -7	        -5	        -2	         0	         2	         5	         7
                    -10	0.09015000	0.09140000	0.09192000	0.09246000	0.09320000	0.09254000	0.09230000
                      2	0.09259000	0.09342000	0.09215000	0.09404000	0.09545000	0.09249000	0.09373000
                     10	0.08872000	0.09034000	0.09081000	0.09120000	0.09117000	0.09125000	0.09105000
                     20	0.07938000	0.07972000	0.08110000	0.08121000	0.08119000	0.08023000	0.07790000
                     28	0.06957000	0.06812000	0.06893000	0.06938000	0.06948000	0.07017000	0.07010000
                     60	0.03075000	0.03725000	0.02813000	0.00913000	0.02886000	0.03638000	0.02973000
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              </tableData>
              <tableData breakPoint="0">
                               -7	        -5	        -2	         0	         2	         5	         7
                    -10	0.00000000	0.00000000	0.00000000	0.00000000	0.00000000	0.00000000	0.00000000
                      2	0.00000000	0.00000000	0.00000000	0.00000000	0.00000000	0.00000000	0.00000000
                     10	0.00000000	0.00000000	0.00000000	0.00000000	0.00000000	0.00000000	0.00000000
                     20	0.00000000	0.00000000	0.00000000	0.00000000	0.00000000	0.00000000	0.00000000
                     28	0.00000000	0.00000000	0.00000000	0.00000000	0.00000000	0.00000000	0.00000000
                     60	0.00000000	0.00000000	0.00000000	0.00000000	0.00000000	0.00000000	0.00000000
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              </tableData>
              <tableData breakPoint="25">
                               -7	        -5	        -2	         0	         2	         5	         7
                    -10	-0.13610000	-0.13754000	-0.13956000	-0.13972000	-0.14104000	-0.14022000	-0.14025000
                      2	-0.13432000	-0.13522000	-0.13190000	-0.13482000	-0.13837000	-0.13231000	-0.13408000
                     10	-0.12295000	-0.12485000	-0.12500000	-0.12540000	-0.12577000	-0.12585000	-0.12490000
                     20	-0.10194000	-0.10166000	-0.10311000	-0.10345000	-0.10388000	-0.10392000	-0.10328000
                     28	-0.07974000	-0.08093000	-0.08200000	-0.08236000	-0.08277000	-0.08278000	-0.08010000
                     60	-0.02194000	-0.02085000	-0.02888000	-0.02162000	-0.02837000	-0.02941000	-0.01959000
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              </tableData>
          </table>
    </function>
    <function name="aero/coefficients/CMMDED2R">
    <description>PITCH MOMENT DUE TO ELEVON 2R</description>
          <table>
            <independentVar lookup="row">aero/alpha-deg</independentVar>
            <independentVar lookup="column">aero/beta-deg</independentVar>
            <independentVar lookup="table">fcs/elevon-2R-pos-deg</independentVar>
              <tableData breakPoint="-16">
                               -7	        -5	        -2	         0	         2	         5	         7
                    -10	0.09015000	0.09140000	0.09192000	0.09246000	0.09320000	0.09254000	0.09230000
                      2	0.09259000	0.09342000	0.09215000	0.09404000	0.09545000	0.09249000	0.09373000
                     10	0.08872000	0.09034000	0.09081000	0.09120000	0.09117000	0.09125000	0.09105000
                     20	0.07938000	0.07972000	0.08110000	0.08121000	0.08119000	0.08023000	0.07790000
                     28	0.06957000	0.06812000	0.06893000	0.06938000	0.06948000	0.07017000	0.07010000
                     60	0.03075000	0.03725000	0.02813000	0.00913000	0.02886000	0.03638000	0.02973000
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              </tableData>
              <tableData breakPoint="0">
                               -7	        -5	        -2	         0	         2	         5	         7
                    -10	0.00000000	0.00000000	0.00000000	0.00000000	0.00000000	0.00000000	0.00000000
                      2	0.00000000	0.00000000	0.00000000	0.00000000	0.00000000	0.00000000	0.00000000
                     10	0.00000000	0.00000000	0.00000000	0.00000000	0.00000000	0.00000000	0.00000000
                     20	0.00000000	0.00000000	0.00000000	0.00000000	0.00000000	0.00000000	0.00000000
                     28	0.00000000	0.00000000	0.00000000	0.00000000	0.00000000	0.00000000	0.00000000
                     60	0.00000000	0.00000000	0.00000000	0.00000000	0.00000000	0.00000000	0.00000000
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              </tableData>
              <tableData breakPoint="25">
                               -7	        -5	        -2	         0	         2	         5	         7
                    -10	-0.13610000	-0.13754000	-0.13956000	-0.13972000	-0.14104000	-0.14022000	-0.14025000
                      2	-0.13432000	-0.13522000	-0.13190000	-0.13482000	-0.13837000	-0.13231000	-0.13408000
                     10	-0.12295000	-0.12485000	-0.12500000	-0.12540000	-0.12577000	-0.12585000	-0.12490000
                     20	-0.10194000	-0.10166000	-0.10311000	-0.10345000	-0.10388000	-0.10392000	-0.10328000
                     28	-0.07974000	-0.08093000	-0.08200000	-0.08236000	-0.08277000	-0.08278000	-0.08010000
                     60	-0.02194000	-0.02085000	-0.02888000	-0.02162000	-0.02837000	-0.02941000	-0.01959000
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              </tableData>
          </table>
    </function>
    <function name="aero/coefficients/CMMDSBL">
    <description>PITCH MOMENT DUE TO LOWER SPEEDBRAKE DEFLECTION</description>
    <product>
          <property>fcs/airbrake-lower</property>
          <table>
            <independentVar lookup="row">aero/alpha-deg</independentVar>
            <tableData>
                    -10		-0.00010200
                     -5		-0.00003673
                      4		-0.00008527
                     12		-0.00014891
                     22		-0.00018964
                     30		-0.00025673
                     60		-0.00014455
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            </tableData>
          </table>
       </product>
    </function>
    <function name="aero/coefficients/CMMDSBU">
    <description>PITCH MOMENT DUE TO UPPER SPEEDBRAKE DEFLECTION</description>
    <product>
          <property>fcs/airbrake-upper</property>
          <table>
            <independentVar lookup="row">aero/alpha-deg</independentVar>
            <tableData>
                    -10		0.00003338
                     -5		0.00001000
                      4		0.00001971
                     12		0.00008382
                     22		0.00010162
                     30		0.00010074
                     60		0.00002706
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            </tableData>
          </table>
       </product>
    </function>
    <function name="aero/coefficients/CMMDSD1L">
    <description>PITCH MOMENT DUE TO LE SLAT 1</description>
    <product>
          <property>fcs/slat-1L-pos-deg</property>
          <table>
            <independentVar lookup="row">aero/alpha-deg</independentVar>
            <tableData>
                    -10		-0.00621600
                     -5		-0.00404800
                      4		-0.00165200
                     12		-0.00130800
                     22		-0.00266400
                     30		-0.00422000
                     60		-0.00164000
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            </tableData>
          </table>
       </product>
    </function>
    <function name="aero/coefficients/CMMDSD2L">
    <description>PITCH MOMENT DUE TO LE SLAT 2</description>
    <product>
          <property>fcs/slat-2L-pos-deg</property>
          <table>
            <independentVar lookup="row">aero/alpha-deg</independentVar>
            <tableData>
                    -10		-0.00098182
                     -5		-0.00086015
                      4		-0.00073636
                     12		-0.00070576
                     22		-0.00063606
                     30		-0.00051348
                     60		0.00063439
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            </tableData>
          </table>
       </product>
    </function>
    <function name="aero/coefficients/CMMGEAR">
    <description>PITCHING MOMENT INCREMENT DUE TO GEAR</description>
    <product>
          <property>gear/gear-pos-norm</property>
          <table>
            <independentVar lookup="row">aero/alpha-deg</independentVar>
            <tableData>
                    -10		0.00023571
                     -5		-0.00010000
                      2		-0.00005000
                      8		0.00012714
                     16		0.00067286
                     22		0.00094143
                     28		0.00139143
                     40		0.00158429
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            </tableData>
          </table>
       </product>
    </function>
    <function name="aero/coefficients/CMMLTNK">
    <description>PITCHING MOMENT INCREMENT DUE TO TANK(LEFT WING)</description>
    <product>
          <property>metrics/stores-wing-tank-left</property>
          <table>
            <independentVar lookup="row">aero/alpha-deg</independentVar>
            <independentVar lookup="column">aero/beta-deg</independentVar>
            <tableData>
                                 -7	         -5	         -2	          0	          2	          5	          7
                    -10	-0.00403000	-0.00386000	-0.00346000	-0.00335000	-0.00297000	-0.00254000	-0.00222000
                      2	-0.00049000	-0.00018000	0.00029000	0.00061000	0.00093000	0.00141000	0.00171000
                     10	0.00165000	0.00220000	0.00263000	0.00292000	0.00322000	0.00363000	0.00401000
                     20	0.00371000	0.00400000	0.00436000	0.00461000	0.00482000	0.00516000	0.00554000
                     28	0.00353000	0.00395000	0.00452000	0.00458000	0.00468000	0.00510000	0.00583000
                     40	0.00232000	0.00157000	0.00240000	0.00249000	0.00240000	0.00253000	0.00277000
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            </tableData>
          </table>
       </product>
    </function>
    <function name="aero/coefficients/CMMmnw">
    <description>PITCH DUE TO MACH</description>
          <table>
            <independentVar lookup="row">velocities/mach</independentVar>
            <independentVar lookup="column">aero/alpha-deg</independentVar>
            <tableData>
                                -10	         -1	       0.01	          1	         10
                    0.2	-0.01065000	0.00161000	0.00301000	0.00436000	0.01545000
                    0.6	0.00000000	0.00000000	0.00000000	0.00000000	0.00000000
                    0.9	0.04061000	-0.00433000	-0.00913000	-0.01376000	-0.05527000
                   0.99	0.01324069	-0.00740000	-0.03016000	-0.05226000	-0.01471416
                    1.6	0.01615127	-0.00291000	-0.01673000	-0.03027000	-0.01618437
                    2.2	0.01749565	0.01513000	0.00372000	-0.00761000	-0.01701366
                    2.5	0.08371000	0.01598000	0.00723000	-0.00145000	-0.08730000
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            </tableData>
          </table>
    </function>
    <function name="aero/coefficients/CMMQ">
    <description>PITCH DAMPING DERIVATIVE</description>
    <product>
          <property>aero/qb</property>
          <table>
            <independentVar lookup="row">aero/alpha-deg</independentVar>
            <tableData>
                    -10		-2.64196530
                     -5		-2.69050280
                      4		-2.82120710
                     12		-2.74735040
                     22		-2.36534260
                     30		-2.01063830
                     60		-2.83151260
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            </tableData>
          </table>
       </product>
    </function>
    <function name="aero/coefficients/CMMRTNK">
    <description>PITCHING MOMENT INCREMENT DUE TO TANK(RIGHT WING)</description>
    <product>
          <property>metrics/stores-wing-tank-right</property>
          <table>
            <independentVar lookup="row">aero/alpha-deg</independentVar>
            <independentVar lookup="column">aero/beta-deg</independentVar>
            <tableData>
                                 -7	         -5	         -2	          0	          2	          5	          7
                    -10	-0.00221000	-0.00252000	-0.00294000	-0.00333000	-0.00349000	-0.00385000	-0.00407000
                      2	0.00170000	0.00141000	0.00092000	0.00061000	0.00029000	-0.00018000	-0.00049000
                     10	0.00375000	0.00363000	0.00320000	0.00292000	0.00263000	0.00220000	0.00196000
                     20	0.00542000	0.00516000	0.00481000	0.00463000	0.00436000	0.00394000	0.00382000
                     28	0.00511000	0.00477000	0.00475000	0.00462000	0.00442000	0.00426000	0.00384000
                     40	0.00273000	0.00216000	0.00268000	0.00252000	0.00235000	0.00148000	0.00228000
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            </tableData>
          </table>
       </product>
    </function>
    <function name="aero/coefficients/CML1">
    <description>BASIC ROLLING MOMENT</description>
          <table>
            <independentVar lookup="row">aero/alpha-deg</independentVar>
            <independentVar lookup="column">aero/beta-deg</independentVar>
            <tableData>
                                 -7	         -5	         -2	          0	          2	          5	          7
                    -10	-0.01884000	-0.01338000	-0.00538000	0.00000000	0.00538000	0.01338000	0.01884000
                      2	0.00747000	0.00537000	0.00216000	0.00000000	-0.00216000	-0.00538000	-0.00747000
                     10	0.02597000	0.01848000	0.00737000	0.00000000	-0.00737000	-0.01848000	-0.02597000
                     20	0.04756000	0.03402000	0.01358000	-0.00001000	-0.01360000	-0.03403000	-0.04761000
                     28	0.06156000	0.04372000	0.01752000	0.00000000	-0.01755000	-0.04374000	-0.06141000
                     60	0.06123000	0.04373000	0.01742000	0.00003000	-0.01761000	-0.04382000	-0.06126000
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            </tableData>
          </table>
    </function>
    <function name="aero/coefficients/CMLCTNK">
    <description>ROLLING MOMENT INCREMENT DUE TO TANK(CENTRE)</description>
    <product>
          <property>metrics/stores-centre-tank</property>
          <table>
            <independentVar lookup="row">aero/alpha-deg</independentVar>
            <independentVar lookup="column">aero/beta-deg</independentVar>
            <tableData>
                                 -7	         -5	         -2	          0	          2	          5	          7
                    -10	-0.00030000	-0.00022000	-0.00009000	-0.00001000	0.00008000	0.00019000	0.00029000
                      2	-0.00010000	-0.00008000	-0.00003000	0.00000000	0.00003000	0.00007000	0.00010000
                     10	0.00003000	0.00004000	0.00001000	0.00000000	0.00000000	-0.00003000	-0.00005000
                     20	0.00015000	0.00017000	0.00007000	0.00002000	-0.00004000	-0.00011000	-0.00018000
                     28	0.00043000	0.00018000	0.00009000	0.00003000	-0.00008000	-0.00020000	-0.00025000
                     40	0.00033000	0.00013000	0.00017000	0.00005000	-0.00017000	-0.00015000	-0.00033000
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            </tableData>
          </table>
       </product>
    </function>
    <function name="aero/coefficients/CMLDED1L">
    <description>ROLLING MOMENT DUE TO ELEVON 1L DEFLECTION</description>
          <table>
            <independentVar lookup="row">aero/alpha-deg</independentVar>
            <independentVar lookup="column">aero/beta-deg</independentVar>
            <independentVar lookup="table">fcs/elevon-1L-pos-deg</independentVar>
              <tableData breakPoint="-16">
                               -7	        -5	        -2	         0	         2	         5	         7
                    -10	-0.02750000	-0.02816000	-0.02889000	-0.02934000	-0.02972000	-0.03015000	-0.03035000
                      2	-0.02875000	-0.02947000	-0.03047000	-0.03111000	-0.03170000	-0.03238000	-0.03269000
                     10	-0.02954000	-0.03029000	-0.03114000	-0.03167000	-0.03212000	-0.03273000	-0.03298000
                     20	-0.02782000	-0.02849000	-0.02938000	-0.02975000	-0.03026000	-0.03066000	-0.03112000
                     28	-0.02426000	-0.02498000	-0.02568000	-0.02600000	-0.02641000	-0.02698000	-0.02716000
                     60	-0.00805000	-0.00784000	-0.00785000	-0.00829000	-0.00841000	-0.00837000	-0.00812000
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              </tableData>
              <tableData breakPoint="0">
                               -7	        -5	        -2	         0	         2	         5	         7
                    -10	0.00000000	0.00000000	0.00000000	0.00000000	0.00000000	0.00000000	0.00000000
                      2	0.00000000	0.00000000	0.00000000	0.00000000	0.00000000	0.00000000	0.00000000
                     10	0.00000000	0.00000000	0.00000000	0.00000000	0.00000000	0.00000000	0.00000000
                     20	0.00000000	0.00000000	0.00000000	0.00000000	0.00000000	0.00000000	0.00000000
                     28	0.00000000	0.00000000	0.00000000	0.00000000	0.00000000	0.00000000	0.00000000
                     60	0.00000000	0.00000000	0.00000000	0.00000000	0.00000000	0.00000000	0.00000000
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              </tableData>
              <tableData breakPoint="25">
                               -7	        -5	        -2	         0	         2	         5	         7
                    -10	0.04144000	0.04248000	0.04385000	0.04466000	0.04537000	0.04621000	0.04666000
                      2	0.04115000	0.04239000	0.04381000	0.04460000	0.04553000	0.04661000	0.04720000
                     10	0.04054000	0.04130000	0.04259000	0.04330000	0.04386000	0.04462000	0.04502000
                     20	0.03499000	0.03567000	0.03684000	0.03760000	0.03815000	0.03880000	0.03902000
                     28	0.02842000	0.02886000	0.02974000	0.03028000	0.03081000	0.03162000	0.03187000
                     60	0.00602000	0.00529000	0.00578000	0.00690000	0.00612000	0.00562000	0.00525000
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              </tableData>
          </table>
    </function>
    <function name="aero/coefficients/CMLDED1R">
    <description>ROLLING MOMENT DUE TO ELEVON 1R DEFLECTION</description>
          <table>
            <independentVar lookup="row">aero/alpha-deg</independentVar>
            <independentVar lookup="column">aero/beta-deg</independentVar>
            <independentVar lookup="table">fcs/elevon-1R-pos-deg</independentVar>
              <tableData breakPoint="-16">
                               -7	        -5	        -2	         0	         2	         5	         7
                    -10	0.02750000	0.02816000	0.02889000	0.02934000	0.02972000	0.03015000	0.03035000
                      2	0.02875000	0.02947000	0.03047000	0.03111000	0.03170000	0.03238000	0.03269000
                     10	0.02954000	0.03029000	0.03114000	0.03167000	0.03212000	0.03273000	0.03298000
                     20	0.02782000	0.02849000	0.02938000	0.02975000	0.03026000	0.03066000	0.03112000
                     28	0.02426000	0.02498000	0.02568000	0.02600000	0.02641000	0.02698000	0.02716000
                     60	0.00805000	0.00784000	0.00785000	0.00829000	0.00841000	0.00837000	0.00812000
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              </tableData>
              <tableData breakPoint="0">
                               -7	        -5	        -2	         0	         2	         5	         7
                    -10	0.00000000	0.00000000	0.00000000	0.00000000	0.00000000	0.00000000	0.00000000
                      2	0.00000000	0.00000000	0.00000000	0.00000000	0.00000000	0.00000000	0.00000000
                     10	0.00000000	0.00000000	0.00000000	0.00000000	0.00000000	0.00000000	0.00000000
                     20	0.00000000	0.00000000	0.00000000	0.00000000	0.00000000	0.00000000	0.00000000
                     28	0.00000000	0.00000000	0.00000000	0.00000000	0.00000000	0.00000000	0.00000000
                     60	0.00000000	0.00000000	0.00000000	0.00000000	0.00000000	0.00000000	0.00000000
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              </tableData>
              <tableData breakPoint="25">
                               -7	        -5	        -2	         0	         2	         5	         7
                    -10	-0.04144000	-0.04248000	-0.04385000	-0.04466000	-0.04537000	-0.04621000	-0.04666000
                      2	-0.04115000	-0.04239000	-0.04381000	-0.04460000	-0.04553000	-0.04661000	-0.04720000
                     10	-0.04054000	-0.04130000	-0.04259000	-0.04330000	-0.04386000	-0.04462000	-0.04502000
                     20	-0.03499000	-0.03567000	-0.03684000	-0.03760000	-0.03815000	-0.03880000	-0.03902000
                     28	-0.02842000	-0.02886000	-0.02974000	-0.03028000	-0.03081000	-0.03162000	-0.03187000
                     60	-0.00602000	-0.00529000	-0.00578000	-0.00690000	-0.00612000	-0.00562000	-0.00525000
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              </tableData>
          </table>
    </function>
    <function name="aero/coefficients/CMLDED2L">
    <description>ROLLING MOMENT DUE TO ELEVON 2L DEFLECTION</description>
          <table>
            <independentVar lookup="row">aero/alpha-deg</independentVar>
            <independentVar lookup="column">aero/beta-deg</independentVar>
            <independentVar lookup="table">fcs/elevon-2L-pos-deg</independentVar>
              <tableData breakPoint="-16">
                               -7	        -5	        -2	         0	         2	         5	         7
                    -10	-0.01471000	-0.01576000	-0.01706000	-0.01809000	-0.01899000	-0.02021000	-0.02104000
                      2	-0.01559000	-0.01673000	-0.01817000	-0.01926000	-0.02011000	-0.02165000	-0.02244000
                     10	-0.01599000	-0.01727000	-0.01896000	-0.02004000	-0.02101000	-0.02244000	-0.02341000
                     20	-0.01529000	-0.01642000	-0.01810000	-0.01911000	-0.02013000	-0.02152000	-0.02266000
                     28	-0.01325000	-0.01474000	-0.01618000	-0.01717000	-0.01798000	-0.01936000	-0.02008000
                     60	-0.00608000	-0.00631000	-0.00725000	-0.00732000	-0.00777000	-0.00875000	-0.00988000
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              </tableData>
              <tableData breakPoint="0">
                               -7	        -5	        -2	         0	         2	         5	         7
                    -10	0.00000000	0.00000000	0.00000000	0.00000000	0.00000000	0.00000000	0.00000000
                      2	0.00000000	0.00000000	0.00000000	0.00000000	0.00000000	0.00000000	0.00000000
                     10	0.00000000	0.00000000	0.00000000	0.00000000	0.00000000	0.00000000	0.00000000
                     20	0.00000000	0.00000000	0.00000000	0.00000000	0.00000000	0.00000000	0.00000000
                     28	0.00000000	0.00000000	0.00000000	0.00000000	0.00000000	0.00000000	0.00000000
                     60	0.00000000	0.00000000	0.00000000	0.00000000	0.00000000	0.00000000	0.00000000
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              </tableData>
              <tableData breakPoint="25">
                               -7	        -5	        -2	         0	         2	         5	         7
                    -10	0.02179000	0.02349000	0.02575000	0.02725000	0.02868000	0.03069000	0.03197000
                      2	0.02252000	0.02403000	0.02624000	0.02783000	0.02903000	0.03135000	0.03247000
                     10	0.02216000	0.02392000	0.02614000	0.02761000	0.02904000	0.03093000	0.03208000
                     20	0.01935000	0.02053000	0.02298000	0.02422000	0.02556000	0.02766000	0.02872000
                     28	0.01614000	0.01689000	0.01900000	0.02009000	0.02140000	0.02323000	0.02381000
                     60	0.00475000	0.00442000	0.00485000	0.00512000	0.00579000	0.00644000	0.00611000
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              </tableData>
          </table>
    </function>
    <function name="aero/coefficients/CMLDED2R">
    <description>ROLLING MOMENT DUE TO ELEVON 2R DEFLECTION</description>
          <table>
            <independentVar lookup="row">aero/alpha-deg</independentVar>
            <independentVar lookup="column">aero/beta-deg</independentVar>
            <independentVar lookup="table">fcs/elevon-2R-pos-deg</independentVar>
              <tableData breakPoint="-16">
                               -7	        -5	        -2	         0	         2	         5	         7
                    -10	0.01471000	0.01576000	0.01706000	0.01809000	0.01899000	0.02021000	0.02104000
                      2	0.01559000	0.01673000	0.01817000	0.01926000	0.02011000	0.02165000	0.02244000
                     10	0.01599000	0.01727000	0.01896000	0.02004000	0.02101000	0.02244000	0.02341000
                     20	0.01529000	0.01642000	0.01810000	0.01911000	0.02013000	0.02152000	0.02266000
                     28	0.01325000	0.01474000	0.01618000	0.01717000	0.01798000	0.01936000	0.02008000
                     60	0.00608000	0.00631000	0.00725000	0.00732000	0.00777000	0.00875000	0.00988000
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              </tableData>
              <tableData breakPoint="0">
                               -7	        -5	        -2	         0	         2	         5	         7
                    -10	0.00000000	0.00000000	0.00000000	0.00000000	0.00000000	0.00000000	0.00000000
                      2	0.00000000	0.00000000	0.00000000	0.00000000	0.00000000	0.00000000	0.00000000
                     10	0.00000000	0.00000000	0.00000000	0.00000000	0.00000000	0.00000000	0.00000000
                     20	0.00000000	0.00000000	0.00000000	0.00000000	0.00000000	0.00000000	0.00000000
                     28	0.00000000	0.00000000	0.00000000	0.00000000	0.00000000	0.00000000	0.00000000
                     60	0.00000000	0.00000000	0.00000000	0.00000000	0.00000000	0.00000000	0.00000000
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              </tableData>
              <tableData breakPoint="25">
                               -7	        -5	        -2	         0	         2	         5	         7
                    -10	-0.02179000	-0.02349000	-0.02575000	-0.02725000	-0.02868000	-0.03069000	-0.03197000
                      2	-0.02252000	-0.02403000	-0.02624000	-0.02783000	-0.02903000	-0.03135000	-0.03247000
                     10	-0.02216000	-0.02392000	-0.02614000	-0.02761000	-0.02904000	-0.03093000	-0.03208000
                     20	-0.01935000	-0.02053000	-0.02298000	-0.02422000	-0.02556000	-0.02766000	-0.02872000
                     28	-0.01614000	-0.01689000	-0.01900000	-0.02009000	-0.02140000	-0.02323000	-0.02381000
                     60	-0.00475000	-0.00442000	-0.00485000	-0.00512000	-0.00579000	-0.00644000	-0.00611000
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              </tableData>
          </table>
    </function>
    <function name="aero/coefficients/CMLDRD">
    <description>ROLLING MOMENT DUE TO RUDDER DEFLECTION</description>
          <table>
            <independentVar lookup="row">aero/alpha-deg</independentVar>
            <independentVar lookup="column">aero/beta-deg</independentVar>
            <independentVar lookup="table">fcs/rudder-pos-deg</independentVar>
              <tableData breakPoint="-25">
                               -7	        -5	        -2	         0	         2	         5	         7
                    -10	0.01522000	0.01535000	0.01558000	0.01569000	0.01577000	0.01593000	0.01603000
                      2	0.01285000	0.01285000	0.01299000	0.01317000	0.01317000	0.01333000	0.01353000
                     10	0.01104000	0.01085000	0.01086000	0.01096000	0.01116000	0.01135000	0.01153000
                     20	0.00884000	0.00910000	0.00866000	0.00872000	0.00878000	0.00916000	0.00928000
                     28	0.00756000	0.00704000	0.00719000	0.00720000	0.00725000	0.00726000	0.00754000
                     60	0.00111000	0.00200000	0.00137000	0.00142000	0.00154000	0.00162000	0.00179000
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              </tableData>
              <tableData breakPoint="0">
                               -7	        -5	        -2	         0	         2	         5	         7
                    -10	0.00000000	0.00000000	0.00000000	0.00000000	0.00000000	0.00000000	0.00000000
                      2	0.00000000	0.00000000	0.00000000	0.00000000	0.00000000	0.00000000	0.00000000
                     10	0.00000000	0.00000000	0.00000000	0.00000000	0.00000000	0.00000000	0.00000000
                     20	0.00000000	0.00000000	0.00000000	0.00000000	0.00000000	0.00000000	0.00000000
                     28	0.00000000	0.00000000	0.00000000	0.00000000	0.00000000	0.00000000	0.00000000
                     60	0.00000000	0.00000000	0.00000000	0.00000000	0.00000000	0.00000000	0.00000000
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              </tableData>
              <tableData breakPoint="25">
                               -7	        -5	        -2	         0	         2	         5	         7
                    -10	-0.01602000	-0.01593000	-0.01577000	-0.01569000	-0.01558000	-0.01534000	-0.01522000
                      2	-0.01353000	-0.01331000	-0.01317000	-0.01317000	-0.01299000	-0.01284000	-0.01285000
                     10	-0.01153000	-0.01136000	-0.01116000	-0.01096000	-0.01088000	-0.01085000	-0.01103000
                     20	-0.00926000	-0.00916000	-0.00877000	-0.00871000	-0.00866000	-0.00908000	-0.00880000
                     28	-0.00771000	-0.00726000	-0.00722000	-0.00719000	-0.00717000	-0.00703000	-0.00763000
                     60	-0.00150000	-0.00155000	-0.00128000	-0.00131000	-0.00114000	-0.00167000	-0.00108000
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              </tableData>
          </table>
    </function>
    <function name="aero/coefficients/CMLGEAR">
    <description>ROLLING MOMENT INCREMENT DUE TO GEAR</description>
    <product>
          <property>gear/gear-pos-norm</property>
          <table>
            <independentVar lookup="row">aero/alpha-deg</independentVar>
            <tableData>
                    -10		0.00000429
                     -5		0.00000429
                      2		-0.00000286
                      8		-0.00000714
                     16		-0.00000286
                     22		0.00001571
                     28		0.00001143
                     40		-0.00001714
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            </tableData>
          </table>
       </product>
    </function>
    <function name="aero/coefficients/CMLLTNK">
    <description>ROLLING MOMENT INCREMENT DUE TO TANK(LEFT WING)</description>
    <product>
          <property>metrics/stores-wing-tank-left</property>
          <table>
            <independentVar lookup="row">aero/alpha-deg</independentVar>
            <independentVar lookup="column">aero/beta-deg</independentVar>
            <tableData>
                                 -7	         -5	         -2	          0	          2	          5	          7
                    -10	0.00112000	0.00093000	0.00071000	0.00059000	0.00049000	0.00036000	0.00033000
                      2	-0.00001000	-0.00004000	-0.00002000	0.00003000	0.00009000	0.00023000	0.00035000
                     10	0.00016000	0.00026000	0.00043000	0.00057000	0.00077000	0.00106000	0.00124000
                     20	0.00128000	0.00153000	0.00188000	0.00213000	0.00241000	0.00286000	0.00314000
                     28	0.00271000	0.00281000	0.00329000	0.00358000	0.00386000	0.00434000	0.00457000
                     40	0.00413000	0.00427000	0.00485000	0.00502000	0.00527000	0.00574000	0.00602000
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            </tableData>
          </table>
       </product>
    </function>
    <function name="aero/coefficients/CMLmnw">
    <description>ROLL DUE TO MACH</description>
          <table>
            <independentVar lookup="row">velocities/mach</independentVar>
            <independentVar lookup="column">aero/alpha-deg</independentVar>
            <tableData>
                                -10	         -1	       0.01	          1	         10
                    0.2	0.00000000	0.00000000	0.00000000	0.00000000	0.00000000
                    0.6	0.00000000	0.00000000	0.00000000	0.00000000	0.00000000
                    0.9	0.00000000	0.00000000	0.00000000	0.00000000	0.00000000
                   0.99	-0.00001000	0.00000000	0.00000000	0.00000000	0.00000000
                    1.6	0.00040000	0.00002000	0.00001000	0.00000000	-0.00007000
                    2.2	-0.00023000	-0.00004000	-0.00003000	-0.00002000	-0.00002000
                    2.5	-0.00010000	-0.00002000	-0.00002000	-0.00001000	-0.00001000
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            </tableData>
          </table>
    </function>
    <function name="aero/coefficients/CMLP">
    <description>ROLL DAMPING DERIVATIVE</description>
    <product>
          <property>aero/pb</property>
          <table>
            <independentVar lookup="row">aero/alpha-deg</independentVar>
            <tableData>
                    -10		-0.33444780
                     -5		-0.36939820
                      4		-0.39188440
                     12		-0.36561530
                     22		-0.28422630
                     30		-0.19701610
                     60		-0.13904640
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            </tableData>
          </table>
       </product>
    </function>
    <function name="aero/coefficients/CMLR">
    <description>ROLLING MOMENT DUE TO YAW RATE</description>
    <product>
          <property>aero/rb</property>
          <table>
            <independentVar lookup="row">aero/alpha-deg</independentVar>
            <tableData>
                    -10		-0.17254870
                     -5		-0.05106250
                      4		0.17052510
                     12		0.37384030
                     22		0.62814600
                     30		0.80598890
                     60		0.86478860
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            </tableData>
          </table>
       </product>
    </function>
    <function name="aero/coefficients/CMLRTNK">
    <description>ROLLING MOMENT INCREMENT DUE TO TANK(RIGHT WING)</description>
    <product>
          <property>metrics/stores-wing-tank-right</property>
          <table>
            <independentVar lookup="row">aero/alpha-deg</independentVar>
            <independentVar lookup="column">aero/beta-deg</independentVar>
            <tableData>
                                 -7	         -5	         -2	          0	          2	          5	          7
                    -10	-0.00033000	-0.00039000	-0.00051000	-0.00061000	-0.00073000	-0.00097000	-0.00113000
                      2	-0.00035000	-0.00024000	-0.00009000	-0.00002000	0.00002000	0.00003000	0.00002000
                     10	-0.00127000	-0.00104000	-0.00076000	-0.00056000	-0.00042000	-0.00024000	-0.00017000
                     20	-0.00314000	-0.00281000	-0.00238000	-0.00209000	-0.00184000	-0.00149000	-0.00128000
                     28	-0.00454000	-0.00436000	-0.00386000	-0.00354000	-0.00328000	-0.00286000	-0.00256000
                     40	-0.00598000	-0.00583000	-0.00527000	-0.00508000	-0.00476000	-0.00426000	-0.00412000
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            </tableData>
          </table>
       </product>
    </function>
    <function name="aero/coefficients/CFYB">
    <description>BASIC SIDE FORCE</description>
          <table>
            <independentVar lookup="row">aero/alpha-deg</independentVar>
            <independentVar lookup="column">aero/beta-deg</independentVar>
            <tableData>
                                 -7	         -5	         -2	          0	          2	          5	          7
                    -10	0.04525000	0.03262000	0.01288000	0.00004000	-0.01287000	-0.03262000	-0.04526000
                      2	0.04914000	0.03507000	0.01400000	0.00000000	-0.01400000	-0.03507000	-0.04914000
                     10	0.03071000	0.02172000	0.00900000	-0.00001000	-0.00901000	-0.02171000	-0.03069000
                     20	-0.01214000	-0.00940000	-0.00420000	0.00003000	0.00423000	0.00929000	0.01236000
                     28	-0.06957000	-0.04451000	-0.01922000	0.00009000	0.01908000	0.04486000	0.06769000
                     60	-0.30336000	-0.21337000	-0.07838000	-0.00004000	0.07813000	0.21407000	0.30121000
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            </tableData>
          </table>
    </function>
    <function name="aero/coefficients/CFYCTNK">
    <description>SIDE FORCE INCREMENT DUE TO TANK(CENTRE)</description>
    <product>
          <property>metrics/stores-centre-tank</property>
          <table>
            <independentVar lookup="row">aero/alpha-deg</independentVar>
            <independentVar lookup="column">aero/beta-deg</independentVar>
            <tableData>
                                 -7	         -5	         -2	          0	          2	          5	          7
                    -10	0.00002000	0.00001000	-0.00001000	-0.00004000	-0.00001000	0.00003000	-0.00001000
                      2	-0.00008000	-0.00004000	-0.00001000	0.00000000	0.00002000	0.00004000	0.00009000
                     10	-0.00008000	-0.00007000	-0.00001000	0.00000000	0.00003000	0.00005000	0.00000000
                     20	-0.00026000	-0.00009000	0.00001000	0.00002000	-0.00001000	0.00014000	-0.00007000
                     28	0.00178000	-0.00021000	-0.00014000	-0.00023000	0.00007000	0.00002000	0.00015000
                     40	-0.00045000	-0.00062000	0.00065000	0.00111000	-0.00209000	-0.00044000	0.00030000
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            </tableData>
          </table>
       </product>
    </function>
    <function name="aero/coefficients/CFYDED1L">
    <description>SIDE FORCE DUE TO ELEVON 1L DEFLECTION</description>
          <table>
            <independentVar lookup="row">aero/alpha-deg</independentVar>
            <independentVar lookup="column">aero/beta-deg</independentVar>
            <independentVar lookup="table">fcs/elevon-1L-pos-deg</independentVar>
              <tableData breakPoint="-16">
                               -7	        -5	        -2	         0	         2	         5	         7
                    -10	-0.01879000	-0.01842000	-0.01709000	-0.01626000	-0.01552000	-0.01413000	-0.01309000
                      2	-0.00763000	-0.00770000	-0.00786000	-0.00798000	-0.00783000	-0.00799000	-0.00805000
                     10	0.00002000	-0.00083000	-0.00188000	-0.00260000	-0.00327000	-0.00419000	-0.00504000
                     20	0.00903000	0.00751000	0.00632000	0.00486000	0.00291000	0.00108000	-0.00096000
                     28	0.01818000	0.01397000	0.01173000	0.00982000	0.00751000	0.00341000	0.00179000
                     60	0.02514000	0.02515000	0.02126000	0.01870000	0.02070000	0.01254000	0.00886000
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              </tableData>
              <tableData breakPoint="0">
                               -7	        -5	        -2	         0	         2	         5	         7
                    -10	0.00000000	0.00000000	0.00000000	0.00000000	0.00000000	0.00000000	0.00000000
                      2	0.00000000	0.00000000	0.00000000	0.00000000	0.00000000	0.00000000	0.00000000
                     10	0.00000000	0.00000000	0.00000000	0.00000000	0.00000000	0.00000000	0.00000000
                     20	0.00000000	0.00000000	0.00000000	0.00000000	0.00000000	0.00000000	0.00000000
                     28	0.00000000	0.00000000	0.00000000	0.00000000	0.00000000	0.00000000	0.00000000
                     60	0.00000000	0.00000000	0.00000000	0.00000000	0.00000000	0.00000000	0.00000000
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              </tableData>
              <tableData breakPoint="25">
                               -7	        -5	        -2	         0	         2	         5	         7
                    -10	0.02199000	0.02217000	0.02213000	0.02175000	0.02147000	0.02103000	0.02016000
                      2	0.00501000	0.00594000	0.00735000	0.00858000	0.00961000	0.01082000	0.01183000
                     10	-0.00534000	-0.00362000	-0.00109000	0.00107000	0.00272000	0.00533000	0.00688000
                     20	-0.01658000	-0.01468000	-0.01118000	-0.00841000	-0.00527000	-0.00175000	0.00137000
                     28	-0.02017000	-0.01935000	-0.01564000	-0.01354000	-0.01036000	-0.00428000	-0.00558000
                     60	-0.01929000	-0.01737000	-0.01787000	-0.01785000	-0.01547000	-0.00934000	-0.00793000
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              </tableData>
          </table>
    </function>
    <function name="aero/coefficients/CFYDED1R">
    <description>SIDE FORCE DUE TO ELEVON 1R DEFLECTION</description>
          <table>
            <independentVar lookup="row">aero/alpha-deg</independentVar>
            <independentVar lookup="column">aero/beta-deg</independentVar>
            <independentVar lookup="table">fcs/elevon-1R-pos-deg</independentVar>
              <tableData breakPoint="-16">
                               -7	        -5	        -2	         0	         2	         5	         7
                    -10	0.01879000	0.01842000	0.01709000	0.01626000	0.01552000	0.01413000	0.01309000
                      2	0.00763000	0.00770000	0.00786000	0.00798000	0.00783000	0.00799000	0.00805000
                     10	-0.00002000	0.00083000	0.00188000	0.00260000	0.00327000	0.00419000	0.00504000
                     20	-0.00903000	-0.00751000	-0.00632000	-0.00486000	-0.00291000	-0.00108000	0.00096000
                     28	-0.01818000	-0.01397000	-0.01173000	-0.00982000	-0.00751000	-0.00341000	-0.00179000
                     60	-0.02514000	-0.02515000	-0.02126000	-0.01870000	-0.02070000	-0.01254000	-0.00886000
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              </tableData>
              <tableData breakPoint="0">
                               -7	        -5	        -2	         0	         2	         5	         7
                    -10	0.00000000	0.00000000	0.00000000	0.00000000	0.00000000	0.00000000	0.00000000
                      2	0.00000000	0.00000000	0.00000000	0.00000000	0.00000000	0.00000000	0.00000000
                     10	0.00000000	0.00000000	0.00000000	0.00000000	0.00000000	0.00000000	0.00000000
                     20	0.00000000	0.00000000	0.00000000	0.00000000	0.00000000	0.00000000	0.00000000
                     28	0.00000000	0.00000000	0.00000000	0.00000000	0.00000000	0.00000000	0.00000000
                     60	0.00000000	0.00000000	0.00000000	0.00000000	0.00000000	0.00000000	0.00000000
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              </tableData>
              <tableData breakPoint="25">
                               -7	        -5	        -2	         0	         2	         5	         7
                    -10	-0.02199000	-0.02217000	-0.02213000	-0.02175000	-0.02147000	-0.02103000	-0.02016000
                      2	-0.00501000	-0.00594000	-0.00735000	-0.00858000	-0.00961000	-0.01082000	-0.01183000
                     10	0.00534000	0.00362000	0.00109000	-0.00107000	-0.00272000	-0.00533000	-0.00688000
                     20	0.01658000	0.01468000	0.01118000	0.00841000	0.00527000	0.00175000	-0.00137000
                     28	0.02017000	0.01935000	0.01564000	0.01354000	0.01036000	0.00428000	0.00558000
                     60	0.01929000	0.01737000	0.01787000	0.01785000	0.01547000	0.00934000	0.00793000
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              </tableData>
          </table>
    </function>
    <function name="aero/coefficients/CFYDED2L">
    <description>SIDE FORCE DUE TO ELEVON 2L DEFLECTION</description>
          <table>
            <independentVar lookup="row">aero/alpha-deg</independentVar>
            <independentVar lookup="column">aero/beta-deg</independentVar>
            <independentVar lookup="table">fcs/elevon-2L-pos-deg</independentVar>
              <tableData breakPoint="-16">
                               -7	        -5	        -2	         0	         2	         5	         7
                    -10	-0.01847000	-0.01791000	-0.01554000	-0.01400000	-0.01278000	-0.01068000	-0.00904000
                      2	-0.01317000	-0.01353000	-0.01218000	-0.01190000	-0.01137000	-0.01108000	-0.01028000
                     10	-0.00939000	-0.01046000	-0.01085000	-0.01066000	-0.01076000	-0.01120000	-0.01156000
                     20	-0.00504000	-0.00573000	-0.00735000	-0.00884000	-0.00933000	-0.01278000	-0.01492000
                     28	0.00489000	-0.00493000	-0.00532000	-0.00779000	-0.00899000	-0.01152000	-0.01478000
                     60	0.01005000	0.01033000	-0.00453000	0.00351000	0.00475000	-0.00953000	-0.00966000
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              </tableData>
              <tableData breakPoint="0">
                               -7	        -5	        -2	         0	         2	         5	         7
                    -10	0.00000000	0.00000000	0.00000000	0.00000000	0.00000000	0.00000000	0.00000000
                      2	0.00000000	0.00000000	0.00000000	0.00000000	0.00000000	0.00000000	0.00000000
                     10	0.00000000	0.00000000	0.00000000	0.00000000	0.00000000	0.00000000	0.00000000
                     20	0.00000000	0.00000000	0.00000000	0.00000000	0.00000000	0.00000000	0.00000000
                     28	0.00000000	0.00000000	0.00000000	0.00000000	0.00000000	0.00000000	0.00000000
                     60	0.00000000	0.00000000	0.00000000	0.00000000	0.00000000	0.00000000	0.00000000
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              </tableData>
              <tableData breakPoint="25">
                               -7	        -5	        -2	         0	         2	         5	         7
                    -10	0.02366000	0.02270000	0.02062000	0.01931000	0.01849000	0.01717000	0.01550000
                      2	0.01535000	0.01533000	0.01478000	0.01562000	0.01603000	0.01747000	0.01727000
                     10	0.00929000	0.01179000	0.01324000	0.01425000	0.01518000	0.01648000	0.01821000
                     20	0.00233000	0.00287000	0.00950000	0.01043000	0.01314000	0.01850000	0.01962000
                     28	0.00650000	-0.00095000	0.00629000	0.00856000	0.01114000	0.01737000	0.01296000
                     60	-0.00366000	0.00055000	-0.00329000	0.00083000	0.00455000	0.00533000	0.00697000
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              </tableData>
          </table>
    </function>
    <function name="aero/coefficients/CFYDED2R">
    <description>SIDE FORCE DUE TO ELEVON 2R DEFLECTION</description>
          <table>
            <independentVar lookup="row">aero/alpha-deg</independentVar>
            <independentVar lookup="column">aero/beta-deg</independentVar>
            <independentVar lookup="table">fcs/elevon-2R-pos-deg</independentVar>
              <tableData breakPoint="-16">
                               -7	        -5	        -2	         0	         2	         5	         7
                    -10	0.01847000	0.01791000	0.01554000	0.01400000	0.01278000	0.01068000	0.00904000
                      2	0.01317000	0.01353000	0.01218000	0.01190000	0.01137000	0.01108000	0.01028000
                     10	0.00939000	0.01046000	0.01085000	0.01066000	0.01076000	0.01120000	0.01156000
                     20	0.00504000	0.00573000	0.00735000	0.00884000	0.00933000	0.01278000	0.01492000
                     28	-0.00489000	0.00493000	0.00532000	0.00779000	0.00899000	0.01152000	0.01478000
                     60	-0.01005000	-0.01033000	0.00453000	-0.00351000	-0.00475000	0.00953000	0.00966000
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              </tableData>
              <tableData breakPoint="0">
                               -7	        -5	        -2	         0	         2	         5	         7
                    -10	0.00000000	0.00000000	0.00000000	0.00000000	0.00000000	0.00000000	0.00000000
                      2	0.00000000	0.00000000	0.00000000	0.00000000	0.00000000	0.00000000	0.00000000
                     10	0.00000000	0.00000000	0.00000000	0.00000000	0.00000000	0.00000000	0.00000000
                     20	0.00000000	0.00000000	0.00000000	0.00000000	0.00000000	0.00000000	0.00000000
                     28	0.00000000	0.00000000	0.00000000	0.00000000	0.00000000	0.00000000	0.00000000
                     60	0.00000000	0.00000000	0.00000000	0.00000000	0.00000000	0.00000000	0.00000000
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              </tableData>
              <tableData breakPoint="25">
                               -7	        -5	        -2	         0	         2	         5	         7
                    -10	-0.02366000	-0.02270000	-0.02062000	-0.01931000	-0.01849000	-0.01717000	-0.01550000
                      2	-0.01535000	-0.01533000	-0.01478000	-0.01562000	-0.01603000	-0.01747000	-0.01727000
                     10	-0.00929000	-0.01179000	-0.01324000	-0.01425000	-0.01518000	-0.01648000	-0.01821000
                     20	-0.00233000	-0.00287000	-0.00950000	-0.01043000	-0.01314000	-0.01850000	-0.01962000
                     28	-0.00650000	0.00095000	-0.00629000	-0.00856000	-0.01114000	-0.01737000	-0.01296000
                     60	0.00366000	-0.00055000	0.00329000	-0.00083000	-0.00455000	-0.00533000	-0.00697000
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              </tableData>
          </table>
    </function>
    <function name="aero/coefficients/CFYDRD">
    <description>SIDE FORCE DUE TO RUDDER DEFLECTION</description>
          <table>
            <independentVar lookup="row">aero/alpha-deg</independentVar>
            <independentVar lookup="column">aero/beta-deg</independentVar>
            <independentVar lookup="table">fcs/rudder-pos-deg</independentVar>
              <tableData breakPoint="0">
                              -25	         0	        25
                    -10	-0.07775000	0.00000000	0.07785000
                      2	-0.07076000	0.00000000	0.07075000
                     10	-0.06476000	0.00000000	0.06469000
                     20	-0.05218000	0.00000000	0.05242000
                     28	-0.04499000	0.00000000	0.04524000
                     60	-0.01080000	0.00000000	0.01210000
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              </tableData>
          </table>
    </function>
    <function name="aero/coefficients/CFYGEAR">
    <description>SIDE FORCE INCREMENT DUE TO GEAR</description>
    <product>
          <property>gear/gear-pos-norm</property>
          <table>
            <independentVar lookup="row">aero/alpha-deg</independentVar>
            <tableData>
                    -10		0.00000143
                     -5		-0.00000429
                      2		0.00000143
                      8		0.00000429
                     16		0.00001571
                     22		0.00005857
                     28		0.00042000
                     40		-0.00017286
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            </tableData>
          </table>
       </product>
    </function>
    <function name="aero/coefficients/CFYLTNK">
    <description>SIDE FORCE INCREMENT DUE TO TANK(LEFT WING)</description>
    <product>
          <property>metrics/stores-wing-tank-left</property>
          <table>
            <independentVar lookup="row">aero/alpha-deg</independentVar>
            <independentVar lookup="column">aero/beta-deg</independentVar>
            <tableData>
                                 -7	         -5	         -2	          0	          2	          5	          7
                    -10	0.00042000	0.00042000	0.00042000	0.00046000	0.00042000	0.00045000	0.00044000
                      2	0.00017000	0.00012000	0.00006000	0.00002000	-0.00002000	-0.00002000	-0.00006000
                     10	0.00051000	0.00045000	0.00037000	0.00036000	0.00042000	0.00004000	0.00001000
                     20	0.00169000	0.00155000	0.00164000	0.00152000	0.00136000	0.00129000	0.00074000
                     28	0.00552000	0.00335000	0.00307000	0.00269000	0.00260000	0.00220000	0.00161000
                     40	0.00743000	0.00634000	0.00741000	0.00548000	0.00406000	0.00360000	0.00250000
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            </tableData>
          </table>
       </product>
    </function>
    <function name="aero/coefficients/CFYP">
    <description>SIDE FORCE DUE TO ROLL RATE</description>
    <product>
          <property>aero/pb</property>
          <table>
            <independentVar lookup="row">aero/alpha-deg</independentVar>
            <tableData>
                    -10		-0.02736110
                     -5		-0.00864680
                      4		0.01552090
                     12		0.02832420
                     22		0.02084820
                     30		0.01196100
                     60		-0.04800650
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            </tableData>
          </table>
       </product>
    </function>
    <function name="aero/coefficients/CFYR">
    <description>SIDE FORCE DUE TO YAW RATE</description>
    <product>
          <property>aero/rb</property>
          <table>
            <independentVar lookup="row">aero/alpha-deg</independentVar>
            <tableData>
                    -10		0.53031200
                     -5		0.49790340
                      4		0.43698790
                     12		0.38390380
                     22		0.26644670
                     30		0.22141270
                     60		-0.08400380
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            </tableData>
          </table>
       </product>
    </function>
    <function name="aero/coefficients/CFYRTNK">
    <description>SIDE FORCE INCREMENT DUE TO TANK(RIGHT WING)</description>
    <product>
          <property>metrics/stores-wing-tank-right</property>
          <table>
            <independentVar lookup="row">aero/alpha-deg</independentVar>
            <independentVar lookup="column">aero/beta-deg</independentVar>
            <tableData>
                                 -7	         -5	         -2	          0	          2	          5	          7
                    -10	-0.00043000	-0.00046000	-0.00044000	-0.00045000	-0.00043000	-0.00039000	-0.00041000
                      2	0.00006000	0.00002000	0.00003000	-0.00001000	-0.00005000	-0.00012000	-0.00017000
                     10	-0.00007000	-0.00005000	-0.00045000	-0.00035000	-0.00041000	-0.00045000	-0.00063000
                     20	-0.00096000	-0.00126000	-0.00134000	-0.00153000	-0.00163000	-0.00153000	-0.00185000
                     28	0.00032000	-0.00210000	-0.00259000	-0.00315000	-0.00330000	-0.00361000	-0.00366000
                     40	-0.00270000	-0.00420000	-0.00422000	-0.00694000	-0.00687000	-0.00694000	-0.00693000
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            </tableData>
          </table>
       </product>
    </function>
    <function name="aero/coefficients/CMN1">
    <description>BASIC YAWING MOMENT</description>
          <table>
            <independentVar lookup="row">aero/alpha-deg</independentVar>
            <independentVar lookup="column">aero/beta-deg</independentVar>
            <tableData>
                                 -7	         -5	         -2	          0	          2	          5	          7
                    -10	-0.00672000	-0.00507000	-0.00212000	-0.00002000	0.00212000	0.00508000	0.00674000
                      2	-0.00282000	-0.00225000	-0.00100000	0.00000000	0.00100000	0.00226000	0.00282000
                     10	-0.00648000	-0.00503000	-0.00202000	0.00000000	0.00202000	0.00504000	0.00648000
                     20	-0.01581000	-0.01212000	-0.00499000	-0.00001000	0.00496000	0.01213000	0.01594000
                     28	-0.02913000	-0.01936000	-0.00832000	-0.00003000	0.00831000	0.01946000	0.02873000
                     60	-0.07091000	-0.05015000	-0.01761000	0.00080000	0.01815000	0.04906000	0.07056000
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            </tableData>
          </table>
    </function>
    <function name="aero/coefficients/CMNCTNK">
    <description>YAWING MOMENT INCREMENT DUE TO TANK(CENTRE)</description>
    <product>
          <property>metrics/stores-centre-tank</property>
          <table>
            <independentVar lookup="row">aero/alpha-deg</independentVar>
            <independentVar lookup="column">aero/beta-deg</independentVar>
            <tableData>
                                 -7	         -5	         -2	          0	          2	          5	          7
                    -10	-0.00197000	-0.00140000	-0.00058000	0.00002000	0.00057000	0.00139000	0.00194000
                      2	-0.00187000	-0.00136000	-0.00055000	0.00000000	0.00055000	0.00135000	0.00187000
                     10	-0.00178000	-0.00129000	-0.00049000	0.00000000	0.00049000	0.00125000	0.00176000
                     20	-0.00166000	-0.00108000	-0.00045000	0.00001000	0.00049000	0.00109000	0.00146000
                     28	-0.00090000	-0.00103000	-0.00036000	0.00004000	0.00037000	0.00096000	0.00123000
                     40	-0.00100000	-0.00075000	-0.00018000	0.00061000	-0.00054000	0.00047000	0.00101000
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            </tableData>
          </table>
       </product>
    </function>
    <function name="aero/coefficients/CMNDED1L">
    <description>YAW MOMENT DUE TO ELEVON 1L</description>
          <table>
            <independentVar lookup="row">aero/alpha-deg</independentVar>
            <independentVar lookup="column">aero/beta-deg</independentVar>
            <independentVar lookup="table">fcs/elevon-1L-pos-deg</independentVar>
              <tableData breakPoint="-16">
                               -7	        -5	        -2	         0	         2	         5	         7
                    -10	-0.00471000	-0.00429000	-0.00380000	-0.00340000	-0.00309000	-0.00248000	-0.00196000
                      2	-0.00385000	-0.00385000	-0.00388000	-0.00391000	-0.00373000	-0.00372000	-0.00372000
                     10	-0.00382000	-0.00395000	-0.00446000	-0.00464000	-0.00488000	-0.00502000	-0.00528000
                     20	-0.00333000	-0.00381000	-0.00446000	-0.00525000	-0.00561000	-0.00631000	-0.00686000
                     28	-0.00139000	-0.00292000	-0.00368000	-0.00467000	-0.00529000	-0.00617000	-0.00712000
                     60	0.00800000	0.00888000	0.00740000	0.00592000	0.00540000	0.00325000	0.00349000
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              </tableData>
              <tableData breakPoint="0">
                               -7	        -5	        -2	         0	         2	         5	         7
                    -10	0.00000000	0.00000000	0.00000000	0.00000000	0.00000000	0.00000000	0.00000000
                      2	0.00000000	0.00000000	0.00000000	0.00000000	0.00000000	0.00000000	0.00000000
                     10	0.00000000	0.00000000	0.00000000	0.00000000	0.00000000	0.00000000	0.00000000
                     20	0.00000000	0.00000000	0.00000000	0.00000000	0.00000000	0.00000000	0.00000000
                     28	0.00000000	0.00000000	0.00000000	0.00000000	0.00000000	0.00000000	0.00000000
                     60	0.00000000	0.00000000	0.00000000	0.00000000	0.00000000	0.00000000	0.00000000
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              </tableData>
              <tableData breakPoint="25">
                               -7	        -5	        -2	         0	         2	         5	         7
                    -10	0.00114000	0.00082000	0.00033000	0.00009000	-0.00022000	-0.00081000	-0.00103000
                      2	-0.00028000	-0.00006000	0.00040000	0.00072000	0.00100000	0.00121000	0.00154000
                     10	-0.00020000	0.00048000	0.00132000	0.00194000	0.00248000	0.00316000	0.00379000
                     20	-0.00070000	0.00012000	0.00151000	0.00252000	0.00333000	0.00463000	0.00557000
                     28	-0.00128000	-0.00059000	0.00057000	0.00170000	0.00268000	0.00446000	0.00417000
                     60	-0.00746000	-0.00725000	-0.00720000	-0.00697000	-0.00648000	-0.00564000	-0.00382000
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              </tableData>
          </table>
    </function>
    <function name="aero/coefficients/CMNDED1R">
    <description>YAW MOMENT DUE TO ELEVON 1R</description>
          <table>
            <independentVar lookup="row">aero/alpha-deg</independentVar>
            <independentVar lookup="column">aero/beta-deg</independentVar>
            <independentVar lookup="table">fcs/elevon-1R-pos-deg</independentVar>
              <tableData breakPoint="-16">
                               -7	        -5	        -2	         0	         2	         5	         7
                    -10	0.00471000	0.00429000	0.00380000	0.00340000	0.00309000	0.00248000	0.00196000
                      2	0.00385000	0.00385000	0.00388000	0.00391000	0.00373000	0.00372000	0.00372000
                     10	0.00382000	0.00395000	0.00446000	0.00464000	0.00488000	0.00502000	0.00528000
                     20	0.00333000	0.00381000	0.00446000	0.00525000	0.00561000	0.00631000	0.00686000
                     28	0.00139000	0.00292000	0.00368000	0.00467000	0.00529000	0.00617000	0.00712000
                     60	-0.00800000	-0.00888000	-0.00740000	-0.00592000	-0.00540000	-0.00325000	-0.00349000
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              </tableData>
              <tableData breakPoint="0">
                               -7	        -5	        -2	         0	         2	         5	         7
                    -10	0.00000000	0.00000000	0.00000000	0.00000000	0.00000000	0.00000000	0.00000000
                      2	0.00000000	0.00000000	0.00000000	0.00000000	0.00000000	0.00000000	0.00000000
                     10	0.00000000	0.00000000	0.00000000	0.00000000	0.00000000	0.00000000	0.00000000
                     20	0.00000000	0.00000000	0.00000000	0.00000000	0.00000000	0.00000000	0.00000000
                     28	0.00000000	0.00000000	0.00000000	0.00000000	0.00000000	0.00000000	0.00000000
                     60	0.00000000	0.00000000	0.00000000	0.00000000	0.00000000	0.00000000	0.00000000
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              </tableData>
              <tableData breakPoint="25">
                               -7	        -5	        -2	         0	         2	         5	         7
                    -10	-0.00114000	-0.00082000	-0.00033000	-0.00009000	0.00022000	0.00081000	0.00103000
                      2	0.00028000	0.00006000	-0.00040000	-0.00072000	-0.00100000	-0.00121000	-0.00154000
                     10	0.00020000	-0.00048000	-0.00132000	-0.00194000	-0.00248000	-0.00316000	-0.00379000
                     20	0.00070000	-0.00012000	-0.00151000	-0.00252000	-0.00333000	-0.00463000	-0.00557000
                     28	0.00128000	0.00059000	-0.00057000	-0.00170000	-0.00268000	-0.00446000	-0.00417000
                     60	0.00746000	0.00725000	0.00720000	0.00697000	0.00648000	0.00564000	0.00382000
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              </tableData>
          </table>
    </function>
    <function name="aero/coefficients/CMNDED2L">
    <description>YAW MOMENT DUE TO ELEVON 2L</description>
          <table>
            <independentVar lookup="row">aero/alpha-deg</independentVar>
            <independentVar lookup="column">aero/beta-deg</independentVar>
            <independentVar lookup="table">fcs/elevon-2L-pos-deg</independentVar>
              <tableData breakPoint="-16">
                               -7	        -5	        -2	         0	         2	         5	         7
                    -10	-0.00405000	-0.00354000	-0.00278000	-0.00255000	-0.00169000	-0.00094000	-0.00047000
                      2	-0.00462000	-0.00434000	-0.00402000	-0.00392000	-0.00376000	-0.00336000	-0.00311000
                     10	-0.00530000	-0.00546000	-0.00539000	-0.00520000	-0.00524000	-0.00519000	-0.00529000
                     20	-0.00600000	-0.00606000	-0.00652000	-0.00671000	-0.00686000	-0.00778000	-0.00836000
                     28	-0.00433000	-0.00704000	-0.00703000	-0.00718000	-0.00801000	-0.00807000	-0.00932000
                     60	0.00008000	0.00007000	-0.00390000	-0.00183000	-0.00071000	-0.00282000	-0.00236000
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              </tableData>
              <tableData breakPoint="0">
                               -7	        -5	        -2	         0	         2	         5	         7
                    -10	0.00000000	0.00000000	0.00000000	0.00000000	0.00000000	0.00000000	0.00000000
                      2	0.00000000	0.00000000	0.00000000	0.00000000	0.00000000	0.00000000	0.00000000
                     10	0.00000000	0.00000000	0.00000000	0.00000000	0.00000000	0.00000000	0.00000000
                     20	0.00000000	0.00000000	0.00000000	0.00000000	0.00000000	0.00000000	0.00000000
                     28	0.00000000	0.00000000	0.00000000	0.00000000	0.00000000	0.00000000	0.00000000
                     60	0.00000000	0.00000000	0.00000000	0.00000000	0.00000000	0.00000000	0.00000000
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              </tableData>
              <tableData breakPoint="25">
                               -7	        -5	        -2	         0	         2	         5	         7
                    -10	0.00221000	0.00204000	0.00109000	0.00095000	0.00003000	-0.00089000	-0.00121000
                      2	0.00323000	0.00327000	0.00299000	0.00286000	0.00288000	0.00308000	0.00304000
                     10	0.00401000	0.00429000	0.00500000	0.00515000	0.00531000	0.00587000	0.00603000
                     20	0.00473000	0.00502000	0.00618000	0.00684000	0.00746000	0.00816000	0.00866000
                     28	0.00693000	0.00508000	0.00636000	0.00713000	0.00761000	0.00933000	0.00770000
                     60	-0.00016000	0.00245000	0.00044000	0.00055000	0.00167000	0.00153000	0.00174000
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              </tableData>
          </table>
    </function>
    <function name="aero/coefficients/CMNDED2R">
    <description>YAW MOMENT DUE TO ELEVON 2R</description>
          <table>
            <independentVar lookup="row">aero/alpha-deg</independentVar>
            <independentVar lookup="column">aero/beta-deg</independentVar>
            <independentVar lookup="table">fcs/elevon-2R-pos-deg</independentVar>
              <tableData breakPoint="-16">
                               -7	        -5	        -2	         0	         2	         5	         7
                    -10	0.00405000	0.00354000	0.00278000	0.00255000	0.00169000	0.00094000	0.00047000
                      2	0.00462000	0.00434000	0.00402000	0.00392000	0.00376000	0.00336000	0.00311000
                     10	0.00530000	0.00546000	0.00539000	0.00520000	0.00524000	0.00519000	0.00529000
                     20	0.00600000	0.00606000	0.00652000	0.00671000	0.00686000	0.00778000	0.00836000
                     28	0.00433000	0.00704000	0.00703000	0.00718000	0.00801000	0.00807000	0.00932000
                     60	-0.00008000	-0.00007000	0.00390000	0.00183000	0.00071000	0.00282000	0.00236000
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              </tableData>
              <tableData breakPoint="0">
                               -7	        -5	        -2	         0	         2	         5	         7
                    -10	0.00000000	0.00000000	0.00000000	0.00000000	0.00000000	0.00000000	0.00000000
                      2	0.00000000	0.00000000	0.00000000	0.00000000	0.00000000	0.00000000	0.00000000
                     10	0.00000000	0.00000000	0.00000000	0.00000000	0.00000000	0.00000000	0.00000000
                     20	0.00000000	0.00000000	0.00000000	0.00000000	0.00000000	0.00000000	0.00000000
                     28	0.00000000	0.00000000	0.00000000	0.00000000	0.00000000	0.00000000	0.00000000
                     60	0.00000000	0.00000000	0.00000000	0.00000000	0.00000000	0.00000000	0.00000000
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              </tableData>
              <tableData breakPoint="25">
                               -7	        -5	        -2	         0	         2	         5	         7
                    -10	-0.00221000	-0.00204000	-0.00109000	-0.00095000	-0.00003000	0.00089000	0.00121000
                      2	-0.00323000	-0.00327000	-0.00299000	-0.00286000	-0.00288000	-0.00308000	-0.00304000
                     10	-0.00401000	-0.00429000	-0.00500000	-0.00515000	-0.00531000	-0.00587000	-0.00603000
                     20	-0.00473000	-0.00502000	-0.00618000	-0.00684000	-0.00746000	-0.00816000	-0.00866000
                     28	-0.00693000	-0.00508000	-0.00636000	-0.00713000	-0.00761000	-0.00933000	-0.00770000
                     60	0.00016000	-0.00245000	-0.00044000	-0.00055000	-0.00167000	-0.00153000	-0.00174000
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              </tableData>
          </table>
    </function>
    <function name="aero/coefficients/CMNDRDr">
    <description>YAWING MOMENT DUE TO RUDDER DEFLECTION</description>
          <table>
            <independentVar lookup="row">aero/alpha-deg</independentVar>
            <independentVar lookup="column">aero/beta-deg</independentVar>
            <independentVar lookup="table">fcs/rudder-pos-deg</independentVar>
              <tableData breakPoint="-25">
                               -7	        -5	        -2	         0	         2	         5	         7
                    -10	-0.03892000	-0.03936000	-0.03984000	-0.04014000	-0.04043000	-0.04088000	-0.04111000
                      2	-0.03583000	-0.03612000	-0.03659000	-0.03929000	-0.03714000	-0.03770000	-0.03800000
                     10	-0.03276000	-0.03274000	-0.03300000	-0.03316000	-0.03395000	-0.03436000	-0.03454000
                     20	-0.02815000	-0.02856000	-0.02827000	-0.02936000	-0.02874000	-0.02966000	-0.03026000
                     28	-0.02382000	-0.02443000	-0.02478000	-0.02519000	-0.02476000	-0.02578000	-0.02449000
                     60	-0.00526000	-0.00577000	-0.00528000	-0.00555000	-0.00640000	-0.00477000	-0.00607000
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              </tableData>
              <tableData breakPoint="0">
                               -7	        -5	        -2	         0	         2	         5	         7
                    -10	0.00000000	0.00000000	0.00000000	0.00000000	0.00000000	0.00000000	0.00000000
                      2	0.00000000	0.00000000	0.00000000	0.00000000	0.00000000	0.00000000	0.00000000
                     10	0.00000000	0.00000000	0.00000000	0.00000000	0.00000000	0.00000000	0.00000000
                     20	0.00000000	0.00000000	0.00000000	0.00000000	0.00000000	0.00000000	0.00000000
                     28	0.00000000	0.00000000	0.00000000	0.00000000	0.00000000	0.00000000	0.00000000
                     60	0.00000000	0.00000000	0.00000000	0.00000000	0.00000000	0.00000000	0.00000000
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              </tableData>
              <tableData breakPoint="25">
                               -7	        -5	        -2	         0	         2	         5	         7
                    -10	0.04111000	0.04087000	0.04042000	0.04011000	0.03984000	0.03937000	0.03895000
                      2	0.03799000	0.03771000	0.03714000	0.03928000	0.03660000	0.03613000	0.03583000
                     10	0.03453000	0.03437000	0.03395000	0.03315000	0.03301000	0.03274000	0.03278000
                     20	0.03036000	0.02966000	0.02871000	0.02930000	0.02824000	0.02856000	0.02825000
                     28	0.02422000	0.02586000	0.02472000	0.02510000	0.02476000	0.02457000	0.02368000
                     60	0.00563000	0.00536000	0.00646000	0.00607000	0.00528000	0.00558000	0.00468000
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              </tableData>
          </table>
    </function>
    <function name="aero/coefficients/CMNGEAR">
    <description>YAWING MOMENT INCREMENT DUE TO GEAR</description>
    <product>
          <property>gear/gear-pos-norm</property>
          <table>
            <independentVar lookup="row">aero/alpha-deg</independentVar>
            <tableData>
                    -10		-0.00000857
                     -5		-0.00000286
                      2		-0.00000143
                      8		0.00000143
                     16		0.00000429
                     22		0.00000000
                     28		0.00009286
                     40		-0.00005571
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            </tableData>
          </table>
       </product>
    </function>
    <function name="aero/coefficients/CMNLTNK">
    <description>YAWING MOMENT INCREMENT DUE TO TANK(LEFT WING)</description>
    <product>
          <property>metrics/stores-wing-tank-left</property>
          <table>
            <independentVar lookup="row">aero/alpha-deg</independentVar>
            <independentVar lookup="column">aero/beta-deg</independentVar>
            <tableData>
                                 -7	         -5	         -2	          0	          2	          5	          7
                    -10	-0.00270000	-0.00233000	-0.00180000	-0.00141000	-0.00106000	-0.00053000	-0.00016000
                      2	-0.00080000	-0.00051000	-0.00005000	0.00025000	0.00055000	0.00098000	0.00125000
                     10	0.00001000	0.00035000	0.00077000	0.00105000	0.00130000	0.00170000	0.00197000
                     20	0.00112000	0.00146000	0.00191000	0.00221000	0.00251000	0.00293000	0.00308000
                     28	0.00271000	0.00253000	0.00314000	0.00345000	0.00375000	0.00423000	0.00431000
                     40	0.00425000	0.00444000	0.00558000	0.00556000	0.00562000	0.00628000	0.00654000
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            </tableData>
          </table>
       </product>
    </function>
    <function name="aero/coefficients/CMNP">
    <description>YAWING MOMENT DUE TO ROLL RATE</description>
    <product>
          <property>aero/pb</property>
          <table>
            <independentVar lookup="row">aero/alpha-deg</independentVar>
            <tableData>
                    -10		0.17380940
                     -5		0.11321540
                      4		-0.02115150
                     12		-0.14738160
                     22		-0.27128050
                     30		-0.31762120
                     60		-0.13308860
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            </tableData>
          </table>
       </product>
    </function>
    <function name="aero/coefficients/CMNR">
    <description>YAW DAMPING DERIVATIVE</description>
    <product>
          <property>aero/rb</property>
          <table>
            <independentVar lookup="row">aero/alpha-deg</independentVar>
            <tableData>
                    -10		-0.20678090
                     -5		-0.23432030
                      4		-0.23536330
                     12		-0.20383270
                     22		-0.09008180
                     30		0.04383790
                     60		0.71858290
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            </tableData>
          </table>
       </product>
    </function>
    <function name="aero/coefficients/CMNRTNK">
    <description>YAWING MOMENT INCREMENT DUE TO TANK(RIGHT WING)</description>
    <product>
          <property>metrics/stores-wing-tank-right</property>
          <table>
            <independentVar lookup="row">aero/alpha-deg</independentVar>
            <independentVar lookup="column">aero/beta-deg</independentVar>
            <tableData>
                                 -7	         -5	         -2	          0	          2	          5	          7
                    -10	0.00014000	0.00051000	0.00106000	0.00147000	0.00179000	0.00231000	0.00267000
                      2	-0.00125000	-0.00099000	-0.00055000	-0.00024000	0.00006000	0.00050000	0.00080000
                     10	-0.00200000	-0.00172000	-0.00131000	-0.00105000	-0.00078000	-0.00036000	-0.00006000
                     20	-0.00318000	-0.00292000	-0.00249000	-0.00222000	-0.00188000	-0.00139000	-0.00118000
                     28	-0.00398000	-0.00420000	-0.00370000	-0.00341000	-0.00313000	-0.00270000	-0.00234000
                     40	-0.00656000	-0.00644000	-0.00570000	-0.00585000	-0.00530000	-0.00454000	-0.00393000
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            </tableData>
          </table>
       </product>
    </function>
  <axis name="LIFT">
    <function name="aero/coefficients/CLIFT">
      <sum>
          <property>aero/coefficients/CFZB</property>
          <property>aero/coefficients/CFZDED1L</property>
          <property>aero/coefficients/CFZDED1R</property>
          <property>aero/coefficients/CFZDE2L</property>
          <property>aero/coefficients/CFZDE2R</property>
          <property>aero/coefficients/CFZDSD1L</property>
          <property>aero/coefficients/CFZDSD2L</property>
          <property>aero/coefficients/CFZDSBU</property>
          <property>aero/coefficients/CFZDEL</property>
          <property>aero/coefficients/CFZGEAR</property>
          <property>aero/coefficients/CFZCTNK</property>
          <property>aero/coefficients/CFZLTNK</property>
          <property>aero/coefficients/CFZRTNK</property>
          <property>aero/coefficients/CFZmn</property>
       </sum>
    </function>
    <function name="aero/force/LIFT">
    <product>
          <property>aero/qbar-psf</property>
          <property>metrics/Sw-sqft</property>
          <property>aero/coefficients/CLIFT</property>
       </product>
    </function>
  </axis>
  <axis name="DRAG">
    <function name="aero/coefficients/CDRAG">
      <sum>
          <property>aero/coefficients/CFXB</property>
          <property>aero/coefficients/CFXDED1L</property>
          <property>aero/coefficients/CFXDED1R</property>
          <property>aero/coefficients/CFXDED2L</property>
          <property>aero/coefficients/CFXDED2R</property>
          <property>aero/coefficients/CFXDSD1L</property>
          <property>aero/coefficients/CFXDSD2L</property>
          <property>aero/coefficients/CFXDSBU</property>
          <property>aero/coefficients/CFXDSBL</property>
          <property>aero/coefficients/CFXGEAR</property>
          <property>aero/coefficients/CFXCTNK</property>
          <property>aero/coefficients/CFXLTNK</property>
          <property>aero/coefficients/CFXRTNK</property>
          <property>aero/coefficients/CFXmn</property>
       </sum>
    </function>
    <function name="aero/force/DRAG">
    <product>
          <property>aero/qbar-psf</property>
          <property>metrics/Sw-sqft</property>
          <property>aero/coefficients/CDRAG</property>
       </product>
    </function>
  </axis>
  <axis name="SIDE">
    <function name="aero/coefficients/CSIDE">
      <sum>
          <property>aero/coefficients/CFYB</property>
          <property>aero/coefficients/CFYP</property>
          <property>aero/coefficients/CFYR</property>
          <property>aero/coefficients/CFYDED1L</property>
          <property>aero/coefficients/CFYDED1R</property>
          <property>aero/coefficients/CFYDED2L</property>
          <property>aero/coefficients/CFYDED2R</property>
          <property>aero/coefficients/CFYDRD</property>
          <property>aero/coefficients/CFYGEAR</property>
          <property>aero/coefficients/CFYCTNK</property>
          <property>aero/coefficients/CFYLTNK</property>
          <property>aero/coefficients/CFYRTNK</property>
       </sum>
    </function>
    <function name="aero/force/SIDE">
    <product>
          <property>aero/qbar-psf</property>
          <property>metrics/Sw-sqft</property>
          <property>aero/coefficients/CSIDE</property>
       </product>
    </function>
  </axis>
  <axis name="ROLL">
    <function name="aero/coefficients/CROLL">
      <sum>
          <property>aero/coefficients/CML1</property>
          <property>aero/coefficients/CMLP</property>
          <property>aero/coefficients/CMLR</property>
          <property>aero/coefficients/CMLDED1L</property>
          <property>aero/coefficients/CMLDED1R</property>
          <property>aero/coefficients/CMLDED2L</property>
          <property>aero/coefficients/CMLDED2R</property>
          <property>aero/coefficients/CMLDRD</property>
          <property>aero/coefficients/CMLGEAR</property>
          <property>aero/coefficients/CMLCTNK</property>
          <property>aero/coefficients/CMLLTNK</property>
          <property>aero/coefficients/CMLRTNK</property>
          <property>aero/coefficients/CMLmnw</property>
       </sum>
    </function>
    <function name="aero/force/ROLL">
    <product>
          <property>aero/qbar-psf</property>
          <property>metrics/Sw-sqft</property>
          <property>metrics/bw-ft</property>
          <property>aero/coefficients/CROLL</property>
       </product>
    </function>
  </axis>
  <axis name="PITCH">
    <function name="aero/coefficients/CPITCH">
      <sum>
          <property>aero/coefficients/CMM1</property>
          <property>aero/coefficients/CMMQ</property>
          <property>aero/coefficients/CMMDED1L</property>
          <property>aero/coefficients/CMMDED1R</property>
          <property>aero/coefficients/CMMDED2L</property>
          <property>aero/coefficients/CMMDED2R</property>
          <property>aero/coefficients/CMMDSD1L</property>
          <property>aero/coefficients/CMMDSD2L</property>
          <property>aero/coefficients/CMMDSBU</property>
          <property>aero/coefficients/CMMDSBL</property>
          <property>aero/coefficients/CMMGEAR</property>
          <property>aero/coefficients/CMMCTNK</property>
          <property>aero/coefficients/CMMLTNK</property>
          <property>aero/coefficients/CMMRTNK</property>
          <property>aero/coefficients/CMMmnw</property>
       </sum>
    </function>
    <function name="aero/force/PITCH">
    <product>
          <property>aero/qbar-psf</property>
          <property>metrics/Sw-sqft</property>
          <property>metrics/cbarw-ft</property>
          <property>aero/coefficients/CPITCH</property>
       </product>
    </function>
  </axis>
  <axis name="YAW">
    <function name="aero/coefficients/CYAW">
      <sum>
          <property>aero/coefficients/CMN1</property>
          <property>aero/coefficients/CMNDED1L</property>
          <property>aero/coefficients/CMNDED1R</property>
          <property>aero/coefficients/CMNDED2L</property>
          <property>aero/coefficients/CMNDED2R</property>
          <property>aero/coefficients/CMNGEAR</property>
          <property>aero/coefficients/CMNCTNK</property>
          <property>aero/coefficients/CMNLTNK</property>
          <property>aero/coefficients/CMNRTNK</property>
          <property>aero/coefficients/CMNDRDr</property>
          <property>aero/coefficients/CMNP</property>
          <property>aero/coefficients/CMNR</property>
       </sum>
    </function>
    <function name="aero/force/YAW">
    <product>
          <property>aero/qbar-psf</property>
          <property>metrics/Sw-sqft</property>
          <property>metrics/bw-ft</property>
          <property>aero/coefficients/CYAW</property>
       </product>
    </function>
  </axis>
</aerodynamics>
    <output name="c:/temp/JSBOut.csv" type="CSV" rate="10">
        <property caption="alpha-deg">aero/alpha-deg</property>
        <property caption="beta-deg">aero/beta-deg</property>
        <property caption="CDRAG">aero/coefficients/CDRAG</property>
        <property caption="CFXB">aero/coefficients/CFXB</property>
        <property caption="CFXCTNK">aero/coefficients/CFXCTNK</property>
        <property caption="CFXDED1L">aero/coefficients/CFXDED1L</property>
        <property caption="CFXDED1R">aero/coefficients/CFXDED1R</property>
        <property caption="CFXDED2L">aero/coefficients/CFXDED2L</property>
        <property caption="CFXDED2R">aero/coefficients/CFXDED2R</property>
        <property caption="CFXDSBL">aero/coefficients/CFXDSBL</property>
        <property caption="CFXDSBU">aero/coefficients/CFXDSBU</property>
        <property caption="CFXDSD1L">aero/coefficients/CFXDSD1L</property>
        <property caption="CFXDSD2L">aero/coefficients/CFXDSD2L</property>
        <property caption="CFXGEAR">aero/coefficients/CFXGEAR</property>
        <property caption="CFXLTNK">aero/coefficients/CFXLTNK</property>
        <property caption="CFXmn">aero/coefficients/CFXmn</property>
        <property caption="CFXRTNK">aero/coefficients/CFXRTNK</property>
        <property caption="CFYB">aero/coefficients/CFYB</property>
        <property caption="CFYCTNK">aero/coefficients/CFYCTNK</property>
        <property caption="CFYDED1L">aero/coefficients/CFYDED1L</property>
        <property caption="CFYDED1R">aero/coefficients/CFYDED1R</property>
        <property caption="CFYDED2L">aero/coefficients/CFYDED2L</property>
        <property caption="CFYDED2R">aero/coefficients/CFYDED2R</property>
        <property caption="CFYDRD">aero/coefficients/CFYDRD</property>
        <property caption="CFYGEAR">aero/coefficients/CFYGEAR</property>
        <property caption="CFYLTNK">aero/coefficients/CFYLTNK</property>
        <property caption="CFYP">aero/coefficients/CFYP</property>
        <property caption="CFYR">aero/coefficients/CFYR</property>
        <property caption="CFYRTNK">aero/coefficients/CFYRTNK</property>
        <property caption="CFZB">aero/coefficients/CFZB</property>
        <property caption="CFZCTNK">aero/coefficients/CFZCTNK</property>
        <property caption="CFZDE2L">aero/coefficients/CFZDE2L</property>
        <property caption="CFZDE2R">aero/coefficients/CFZDE2R</property>
        <property caption="CFZDED1L">aero/coefficients/CFZDED1L</property>
        <property caption="CFZDED1R">aero/coefficients/CFZDED1R</property>
        <property caption="CFZDEL">aero/coefficients/CFZDEL</property>
        <property caption="CFZDSBU">aero/coefficients/CFZDSBU</property>
        <property caption="CFZDSD1L">aero/coefficients/CFZDSD1L</property>
        <property caption="CFZDSD2L">aero/coefficients/CFZDSD2L</property>
        <property caption="CFZGEAR">aero/coefficients/CFZGEAR</property>
        <property caption="CFZLTNK">aero/coefficients/CFZLTNK</property>
        <property caption="CFZmn">aero/coefficients/CFZmn</property>
        <property caption="CFZRTNK">aero/coefficients/CFZRTNK</property>
        <property caption="CLIFT">aero/coefficients/CLIFT</property>
        <property caption="CML1">aero/coefficients/CML1</property>
        <property caption="CMLCTNK">aero/coefficients/CMLCTNK</property>
        <property caption="CMLDED1L">aero/coefficients/CMLDED1L</property>
        <property caption="CMLDED1R">aero/coefficients/CMLDED1R</property>
        <property caption="CMLDED2L">aero/coefficients/CMLDED2L</property>
        <property caption="CMLDED2R">aero/coefficients/CMLDED2R</property>
        <property caption="CMLDRD">aero/coefficients/CMLDRD</property>
        <property caption="CMLGEAR">aero/coefficients/CMLGEAR</property>
        <property caption="CMLLTNK">aero/coefficients/CMLLTNK</property>
        <property caption="CMLmnw">aero/coefficients/CMLmnw</property>
        <property caption="CMLP">aero/coefficients/CMLP</property>
        <property caption="CMLR">aero/coefficients/CMLR</property>
        <property caption="CMLRTNK">aero/coefficients/CMLRTNK</property>
        <property caption="CMM1">aero/coefficients/CMM1</property>
        <property caption="CMMCTNK">aero/coefficients/CMMCTNK</property>
        <property caption="CMMDED1L">aero/coefficients/CMMDED1L</property>
        <property caption="CMMDED1R">aero/coefficients/CMMDED1R</property>
        <property caption="CMMDED2L">aero/coefficients/CMMDED2L</property>
        <property caption="CMMDED2R">aero/coefficients/CMMDED2R</property>
        <property caption="CMMDSBL">aero/coefficients/CMMDSBL</property>
        <property caption="CMMDSBU">aero/coefficients/CMMDSBU</property>
        <property caption="CMMDSD1L">aero/coefficients/CMMDSD1L</property>
        <property caption="CMMDSD2L">aero/coefficients/CMMDSD2L</property>
        <property caption="CMMGEAR">aero/coefficients/CMMGEAR</property>
        <property caption="CMMLTNK">aero/coefficients/CMMLTNK</property>
        <property caption="CMMmnw">aero/coefficients/CMMmnw</property>
        <property caption="CMMQ">aero/coefficients/CMMQ</property>
        <property caption="CMMRTNK">aero/coefficients/CMMRTNK</property>
        <property caption="CMN1">aero/coefficients/CMN1</property>
        <property caption="CMNCTNK">aero/coefficients/CMNCTNK</property>
        <property caption="CMNDED1L">aero/coefficients/CMNDED1L</property>
        <property caption="CMNDED1R">aero/coefficients/CMNDED1R</property>
        <property caption="CMNDED2L">aero/coefficients/CMNDED2L</property>
        <property caption="CMNDED2R">aero/coefficients/CMNDED2R</property>
        <property caption="CMNDRDr">aero/coefficients/CMNDRDr</property>
        <property caption="CMNGEAR">aero/coefficients/CMNGEAR</property>
        <property caption="CMNLTNK">aero/coefficients/CMNLTNK</property>
        <property caption="CMNP">aero/coefficients/CMNP</property>
        <property caption="CMNR">aero/coefficients/CMNR</property>
        <property caption="CMNRTNK">aero/coefficients/CMNRTNK</property>
        <property caption="CPITCH">aero/coefficients/CPITCH</property>
        <property caption="CROLL">aero/coefficients/CROLL</property>
        <property caption="CSIDE">aero/coefficients/CSIDE</property>
        <property caption="CYAW">aero/coefficients/CYAW</property>
        <property caption="pb">aero/pb</property>
        <property caption="qb">aero/qb</property>
        <property caption="qbar-psf">aero/qbar-psf</property>
        <property caption="rb">aero/rb</property>
        <property caption="phi-deg">attitude/phi-deg</property>
        <property caption="psi-deg">attitude/psi-deg</property>
        <property caption="theta-deg">attitude/theta-deg</property>
        <property caption="airbrake-lower">fcs/airbrake-lower</property>
        <property caption="airbrake-upper">fcs/airbrake-upper</property>
        <property caption="elevon-1L-pos-deg">fcs/elevon-1L-pos-deg</property>
        <property caption="elevon-1R-pos-deg">fcs/elevon-1R-pos-deg</property>
        <property caption="elevon-2L-pos-deg">fcs/elevon-2L-pos-deg</property>
        <property caption="elevon-2R-pos-deg">fcs/elevon-2R-pos-deg</property>
        <property caption="rudder-pos-deg">fcs/rudder-pos-deg</property>
        <property caption="slat-1L-pos-deg">fcs/slat-1L-pos-deg</property>
        <property caption="slat-2L-pos-deg">fcs/slat-2L-pos-deg</property>
        <property caption="fbx-total-lbs">forces/fbx-total-lbs</property>
        <property caption="fby-total-lbs">forces/fby-total-lbs</property>
        <property caption="fbz-total-lbs">forces/fbz-total-lbs</property>
        <property caption="gear-pos-norm">gear/gear-pos-norm</property>
        <property caption="stores-centre-tank">metrics/stores-centre-tank</property>
        <property caption="stores-wing-tank-left">metrics/stores-wing-tank-left</property>
        <property caption="stores-wing-tank-right">metrics/stores-wing-tank-right</property>
        <property caption="l-total-lbsft">moments/l-total-lbsft</property>
        <property caption="m-total-lbsft">moments/m-total-lbsft</property>
        <property caption="n-total-lbsft">moments/n-total-lbsft</property>
        <property caption="mach">velocities/mach</property>
        <property caption="p-aero-rad_sec">velocities/p-aero-rad_sec</property>
        <property caption="q-aero-rad_sec">velocities/q-aero-rad_sec</property>
        <property caption="r-aero-rad_sec">velocities/r-aero-rad_sec</property>
        <property caption="vt-fps">velocities/vt-fps</property>
    </output>
</fdm_config>
